r == [x*cos(φ) - y*sin(φ); x*sin(φ) + y*cos(φ)]
det([i, j, k; 0, 0, nS; x, y, 0]) → j*nS*x - i*nS*y
v == [(vx - nS*y)*cos(φ) - (vy + nS*x)*sin(φ); (vx - nS*y)*sin(φ) + (vy + nS*x)*cos(φ)]
[x*cos(φ) - y*sin(φ); x*sin(φ) + y*cos(φ); 0]×[(vx - nS*y)*cos(φ) - (vy + nS*x)*sin(φ); (vx - nS*y)*sin(φ) + (vy + nS*x)*cos(φ); 0] → [
    0;
    0;
    (cos(φ)*(vy + nS*x) + sin(φ)*(vx - nS*y))*(x*cos(φ) - y*sin(φ)) + (sin(φ)*(vy + nS*x) - cos(φ)*(vx - nS*y))*(x*sin(φ) + y*cos(φ))
]
(cos(φ)*(vy + nS*x) + sin(φ)*(vx - nS*y))*(x*cos(φ) - y*sin(φ)) + (sin(φ)*(vy + nS*x) - cos(φ)*(vx - nS*y))*(x*sin(φ) + y*cos(φ)) simplify → nS*x^2 + vy*x + nS*y^2 - vx*y
σ == vy*x - vx*y + nS*(x^2 + y^2)
nS*x^2 + vy*x + nS*y^2 - vx*y
-([0; 0; vy*x - vx*y + nS*(x^2 + y^2)]×[(vx - nS*y)*cos(φ) - (vy + nS*x)*sin(φ); (vx - nS*y)*sin(φ) + (vy + nS*x)*cos(φ); 0]) - fME/sqrt(x^2 + y^2)*[x*cos(φ) - y*sin(φ); x*sin(φ) + y*cos(φ); 0] simplify → [
    (nS*x^2 + vy*x + nS*y^2 - vx*y)*(vy*cos(φ) + vx*sin(φ) + nS*x*cos(φ) - nS*y*sin(φ)) - fME*(x*cos(φ) - y*sin(φ))/sqrt(x^2 + y^2);
    (nS*x^2 + vy*x + nS*y^2 - vx*y)*(vy*sin(φ) - vx*cos(φ) + nS*x*sin(φ) + nS*y*cos(φ)) - fME*(x*sin(φ) + y*cos(φ))/sqrt(x^2 + y^2);
    0
]
Λξ == (nS*x^2 + vy*x + nS*y^2 - vx*y)*(vy*cos(φ) + vx*sin(φ) + nS*x*cos(φ) - nS*y*sin(φ)) - fME*(x*cos(φ) - y*sin(φ))/sqrt(x^2 + y^2)
Λη == (nS*x^2 + vy*x + nS*y^2 - vx*y)*(vy*sin(φ) - vx*cos(φ) + nS*x*sin(φ) + nS*y*cos(φ)) - fME*(x*sin(φ) + y*cos(φ))/sqrt(x^2 + y^2)
d/dt(σ) == -y*ΦΣx + x*ΦΣy
d/dvx((nS*x^2 + vy*x + nS*y^2 - vx*y)*(vy*cos(φ) + vx*sin(φ) + nS*x*cos(φ) - nS*y*sin(φ)) - fME*(x*cos(φ) - y*sin(φ))/sqrt(x^2 + y^2)) → sin(φ)*(nS*x^2 + vy*x + nS*y^2 - vx*y) - y*(vy*cos(φ) + vx*sin(φ) + nS*x*cos(φ) - nS*y*sin(φ))
d/dvx((nS*x^2 + vy*x + nS*y^2 - vx*y)*(vy*sin(φ) - vx*cos(φ) + nS*x*sin(φ) + nS*y*cos(φ)) - fME*(x*sin(φ) + y*cos(φ))/sqrt(x^2 + y^2)) → -(cos(φ)*(nS*x^2 + vy*x + nS*y^2 - vx*y)) - y*(vy*sin(φ) - vx*cos(φ) + nS*x*sin(φ) + nS*y*cos(φ))
d/dt(Λξ) == (sin(φ)*(nS*x^2 + vy*x + nS*y^2 - vx*y) - y*(vy*cos(φ) + vx*sin(φ) + nS*x*cos(φ) - nS*y*sin(φ)))*ΦΣx + (cos(φ)*(nS*x^2 + vy*x + nS*y^2 - vx*y) + x*(vy*cos(φ) + vx*sin(φ) + nS*x*cos(φ) - nS*y*sin(φ)))*ΦΣy
d/dt(Λη) == (-(cos(φ)*(nS*x^2 + vy*x + nS*y^2 - vx*y)) - y*(vy*sin(φ) - vx*cos(φ) + nS*x*sin(φ) + nS*y*cos(φ)))*ΦΣx + (sin(φ)*(nS*x^2 + vy*x + nS*y^2 - vx*y) + x*(vy*sin(φ) - vx*cos(φ) + nS*x*sin(φ) + nS*y*cos(φ)))*ΦΣy
d/dt(β) == σ/r^2 - d/dt(φ)
# system 1
nS == d/dt(φ)
d/dt(Λξ) == (sin(φ)*(nS*(x^2 + y^2) + vy*x - vx*y) - y*(vy*cos(φ) + vx*sin(φ) + nS*(x*cos(φ) - y*sin(φ))))*ΦΣx + (cos(φ)*(nS*(x^2 + y^2) + vy*x - vx*y) + x*(vy*cos(φ) + vx*sin(φ) + nS*(x*cos(φ) - y*sin(φ))))*ΦΣy
d/dt(Λη) == (-(cos(φ)*(nS*(x^2 + y^2) + vy*x - vx*y)) - y*(vy*sin(φ) - vx*cos(φ) + nS*(x*sin(φ) + y*cos(φ))))*ΦΣx + (sin(φ)*(nS*(x^2 + y^2) + vy*x - vx*y) + x*(vy*sin(φ) - vx*cos(φ) + nS*(x*sin(φ) + y*cos(φ))))*ΦΣy
d/dt(σ) == -y*ΦΣx + x*ΦΣy
d/dt(β) == σ/r^2 - d/dt(φ)
x == r*cos(β)
y == r*sin(β)
ecc == sqrt(Λξ^2 + Λη^2)
υ == φ + β - ω
ω == atan2(Λξ, Λη)
υ == φ + β - atan2(Λξ, Λη)
φ(t) == nS*t
r == σ^2/(1 + sqrt(Λξ^2 + Λη^2)*cos(φ + β - atan2(Λξ, Λη)))
vξ == vr*cos(β0) - vn*sin(β0)
β0 == β + φ
vη == vr*sin(β0) + vn*cos(β0)
vr == sqrt(1/σ^2)*sqrt(Λξ^2 + Λη^2)*sin(φ + β - atan2(Λξ, Λη))
vn == sqrt(1/σ^2)*(1 + sqrt(Λξ^2 + Λη^2)*cos(φ + β - atan2(Λξ, Λη)))
vxa == vξ*cos(φ) + vη*sin(φ)
vya == -vξ*sin(φ) + vη*cos(φ)
vx == vxa + nS*y
vy == vya - nS*x
# скорости относительные
vx == ((vr*cos(β0) - vn*sin(β0))*cos(φ) + (vr*sin(β0) + vn*cos(β0))*sin(φ)) + nS*y
vy == (-(vr*cos(β0) - vn*sin(β0))*sin(φ) + (vr*sin(β0) + vn*cos(β0))*cos(φ)) - nS*x
ΦS == μS*([rS - r*cos(ββ); -r*sin(ββ)]/sqrt(r^2 + rS^2 - 2*r*rS*cos(ββ))^3 - [rS; 0]/rS^3)
r/rS == ε
ΦS == μS*([1 - rr*cos(ββ); -rr*sin(ββ)]/sqrt(rr^2 + 1^2 - 2*rr*cos(ββ))^3 - [1; 0]/rS^2)
[1 - rr*cos(ββ); -rr*sin(ββ)]/(rS^2*sqrt(rr^2 + 1^2 - 2*rr*cos(ββ))^3) - [1; 0]/rS^2 assume, rr == 0 → [0; 0]
d/drr([1 - rr*cos(ββ); -rr*sin(ββ)]/(rS^2*sqrt(rr^2 + 1^2 - 2*rr*cos(ββ))^3) - [1; 0]/rS^2) → [
    3*(rr*cos(ββ) - 1)*(2*rr - 2*cos(ββ))/(2*rS^2*(rr^2 - 2*cos(ββ)*rr + 1)^(5/2)) - cos(ββ)/(rS^2*(rr^2 - 2*cos(ββ)*rr + 1)^(3/2));
    3*rr*sin(ββ)*(2*rr - 2*cos(ββ))/(2*rS^2*(rr^2 - 2*cos(ββ)*rr + 1)^(5/2)) - sin(ββ)/(rS^2*(rr^2 - 2*cos(ββ)*rr + 1)^(3/2))
]
[
    3*(rr*cos(ββ) - 1)*(2*rr - 2*cos(ββ))/(2*rS^2*(rr^2 - 2*cos(ββ)*rr + 1)^(5/2)) - cos(ββ)/(rS^2*(rr^2 - 2*cos(ββ)*rr + 1)^(3/2));
    3*rr*sin(ββ)*(2*rr - 2*cos(ββ))/(2*rS^2*(rr^2 - 2*cos(ββ)*rr + 1)^(5/2)) - sin(ββ)/(rS^2*(rr^2 - 2*cos(ββ)*rr + 1)^(3/2))
] assume, rr == 0 → [2*cos(ββ)/rS^2; -sin(ββ)/rS^2]
ΦS == μS*[2*cos(ββ); -sin(ββ)]*r/rS^3
ΦM == μM*([rM*cos(αM) - r*cos(ββ); rM*sin(αM) - r*sin(ββ)]/sqrt((rM*cos(αM) - r*cos(ββ))^2 + (rM*sin(αM) - r*sin(ββ))^2)^3 - [rM*cos(αM); rM*sin(αM)]/rM^3)
(rM*cos(αM) - r*cos(ββ))^2 + (rM*sin(αM) - r*sin(ββ))^2 simplify → r^2 - 2*cos(αM - ββ)*r*rM + rM^2
ΦM == μM*([rM*cos(αM) - r*cos(ββ); rM*sin(αM) - r*sin(ββ)]/sqrt(r^2 - 2*cos(αM - ββ)*r*rM + rM^2)^3 - [rM*cos(αM); rM*sin(αM)]/rM^3)
ΦΣx == μM*((rM*cos(αM) - r*cos(ββ))/sqrt(r^2 - 2*cos(αM - ββ)*r*rM + rM^2)^3 - rM*cos(αM)/rM^3) + μS*2*cos(ββ)*r/rS^3
ΦΣy == μM*((rM*sin(αM) - r*sin(ββ))/sqrt(r^2 - 2*cos(αM - ββ)*r*rM + rM^2)^3 - rM*sin(αM)/rM^3) + μS*(-sin(ββ))*r/rS^3
fMS := 1.32712440018*10^11*km^3/s^2
fME := 398600*km^3/s^2
fMM := 4902.72*km^3/s^2
AU := 149598500*km
unitR := 384400*km
unitT := sqrt(unitR^3/(fMM + fME))
unitV := unitR*unitT^-1
unitAcc := unitV*unitT^-1
630*unitT^-1 =  # no stored result
μS := fMS*unitT^2/unitR^3
rS := 1*AU*unitR^-1
μE := fME*unitT^2/unitR^3
μM := fMM*unitT^2/unitR^3
573.498892714
573.499753961
nS := sqrt((fMS + fME*0)/AU^3)*unitT
nM := sqrt((fMM + fME)/unitR^3)*unitT
μM := 0  # disabled
μS := 0  # disabled
φ(t) := nS*t
r(Λξ, Λη, σ, β, t) := σ^2/(1 + sqrt(Λξ^2 + Λη^2)*cos(φ(t) + β - atan2(Λξ, Λη)))
vr == sqrt(1/σ^2)*sqrt(Λξ^2 + Λη^2)*sin(φ + β - atan2(Λξ, Λη))
vr(Λξ, Λη, σ, β, t) := sqrt(1/σ^2)*sqrt(Λξ^2 + Λη^2)*sin(φ(t) + β - atan2(Λξ, Λη))
vn == sqrt(1/σ^2)*(1 + sqrt(Λξ^2 + Λη^2)*cos(φ + β - atan2(Λξ, Λη)))
vn(Λξ, Λη, σ, β, t) := sqrt(1/σ^2)*(1 + sqrt(Λξ^2 + Λη^2)*cos(φ(t) + β - atan2(Λξ, Λη)))
β0(β, t) := β + φ(t)
vx(Λξ, Λη, σ, β, t) := (vr(Λξ, Λη, σ, β, t)*cos(β0(β, t)) - vn(Λξ, Λη, σ, β, t)*sin(β0(β, t)))*cos(φ(t)) + (vr(Λξ, Λη, σ, β, t)*sin(β0(β, t)) + vn(Λξ, Λη, σ, β, t)*cos(β0(β, t)))*sin(φ(t)) + nS*r(Λξ, Λη, σ, β, t)*sin(β)
vx == ((vr*cos(β0) - vn*sin(β0))*cos(φ) + (vr*sin(β0) + vn*cos(β0))*sin(φ)) + nS*y
vy(Λξ, Λη, σ, β, t) := -(vr(Λξ, Λη, σ, β, t)*cos(β0(β, t)) - vn(Λξ, Λη, σ, β, t)*sin(β0(β, t)))*sin(φ(t)) + (vr(Λξ, Λη, σ, β, t)*sin(β0(β, t)) + vn(Λξ, Λη, σ, β, t)*cos(β0(β, t)))*cos(φ(t)) - nS*r(Λξ, Λη, σ, β, t)*cos(β)
vy == (-(vr*cos(β0) - vn*sin(β0))*sin(φ) + (vr*sin(β0) + vn*cos(β0))*cos(φ)) - nS*x
rM := 1
ΦΣx == μM*((rM*cos(αM) - r*cos(ββ))/sqrt(r^2 - 2*cos(αM - ββ)*r*rM + rM^2)^3 - rM*cos(αM)/rM^3) + μS*2*cos(ββ)*r/rS
ΦΣx(Λξ, Λη, σ, β, αM, t) := μM*((rM*cos(αM) - r(Λξ, Λη, σ, β, t)*cos(β))/sqrt(r(Λξ, Λη, σ, β, t)^2 - 2*cos(αM - β)*r(Λξ, Λη, σ, β, t)*rM + rM^2)^3 - 1*cos(αM)/rM^3) + μS*2*cos(β)*r(Λξ, Λη, σ, β, t)/rS^3
ΦΣy(Λξ, Λη, σ, β, αM, t) := μM*((rM*sin(αM) - r(Λξ, Λη, σ, β, t)*sin(β))/sqrt(r(Λξ, Λη, σ, β, t)^2 - 2*cos(αM - β)*r(Λξ, Λη, σ, β, t)*rM + rM^2)^3 - rM*sin(αM)/rM^3) + μS*(-sin(β))*r(Λξ, Λη, σ, β, t)/rS^3
ΦΣy == μM*((rM*sin(αM) - r*sin(ββ))/sqrt(r^2 - 2*cos(αM - ββ)*r*rM + rM^2)^3 - rM*sin(αM)/rM^3) + μS*(-sin(ββ))*r/rS
φ(t)  # disabled
r*cos(β)  # disabled
r*sin(β)  # disabled
fΛξ(Λξ, Λη, σ, β, αM, t) := (sin(φ(t))*(nS*(r(Λξ, Λη, σ, β, t)^2) + vy(Λξ, Λη, σ, β, t)*r(Λξ, Λη, σ, β, t)*cos(β) - vx(Λξ, Λη, σ, β, t)*r(Λξ, Λη, σ, β, t)*sin(β)) + (-r(Λξ, Λη, σ, β, t)*sin(β)*(vy(Λξ, Λη, σ, β, t)*cos(φ(t)) + vx(Λξ, Λη, σ, β, t)*sin(φ(t)) + nS*(r(Λξ, Λη, σ, β, t)*cos(β)*cos(φ(t)) - r(Λξ, Λη, σ, β, t)*sin(β)*sin(φ(t))))))*ΦΣx(Λξ, Λη, σ, β, αM, t) + (cos(φ(t))*(nS*(r(Λξ, Λη, σ, β, t)^2) + vy(Λξ, Λη, σ, β, t)*r(Λξ, Λη, σ, β, t)*cos(β) - vx(Λξ, Λη, σ, β, t)*(r(Λξ, Λη, σ, β, t)*sin(β))) + r(Λξ, Λη, σ, β, t)*cos(β)*(vy(Λξ, Λη, σ, β, t)*cos(φ(t)) + vx(Λξ, Λη, σ, β, t)*sin(φ(t)) + nS*(r(Λξ, Λη, σ, β, t)*cos(β)*cos(φ(t)) - r(Λξ, Λη, σ, β, t)*sin(β)*sin(φ(t)))))*ΦΣy(Λξ, Λη, σ, β, αM, t)
d/dt(Λξ) == (sin(φ)*(nS*(x^2 + y^2) + vy*x - vx*y) - y*(vy*cos(φ) + vx*sin(φ) + nS*(x*cos(φ) - y*sin(φ))))*ΦΣx + (cos(φ)*(nS*(x^2 + y^2) + vy*x - vx*y) + x*(vy*cos(φ) + vx*sin(φ) + nS*(x*cos(φ) - y*sin(φ))))*ΦΣy
d/dt(Λη) == (-(cos(φ)*(nS*(x^2 + y^2) + vy*x - vx*y)) - y*(vy*sin(φ) - vx*cos(φ) + nS*(x*sin(φ) + y*cos(φ))))*ΦΣx + (sin(φ)*(nS*(x^2 + y^2) + vy*x - vx*y) + x*(vy*sin(φ) - vx*cos(φ) + nS*(x*sin(φ) + y*cos(φ))))*ΦΣy
fΛη(Λξ, Λη, σ, β, αM, t) := (-cos(φ(t))*(nS*(r(Λξ, Λη, σ, β, t)^2) + vy(Λξ, Λη, σ, β, t)*(r(Λξ, Λη, σ, β, t)*cos(β)) - vx(Λξ, Λη, σ, β, t)*(r(Λξ, Λη, σ, β, t)*sin(β))) + (-(r(Λξ, Λη, σ, β, t)*sin(β))*(vy(Λξ, Λη, σ, β, t)*sin(φ(t)) - vx(Λξ, Λη, σ, β, t)*cos(φ(t)) + nS*(r(Λξ, Λη, σ, β, t)*cos(β)*sin(φ(t)) + r(Λξ, Λη, σ, β, t)*sin(β)*cos(φ(t))))))*ΦΣx(Λξ, Λη, σ, β, αM, t) + (sin(φ(t))*(nS*(r(Λξ, Λη, σ, β, t)^2) + vy(Λξ, Λη, σ, β, t)*(r(Λξ, Λη, σ, β, t)*cos(β)) - vx(Λξ, Λη, σ, β, t)*(r(Λξ, Λη, σ, β, t)*sin(β))) + r(Λξ, Λη, σ, β, t)*cos(β)*(vy(Λξ, Λη, σ, β, t)*sin(φ(t)) - vx(Λξ, Λη, σ, β, t)*cos(φ(t)) + nS*(r(Λξ, Λη, σ, β, t)*cos(β)*sin(φ(t)) + r(Λξ, Λη, σ, β, t)*sin(β)*cos(φ(t)))))*ΦΣy(Λξ, Λη, σ, β, αM, t)
fσ(Λξ, Λη, σ, β, αM, t) := -(r(Λξ, Λη, σ, β, t)*sin(β))*ΦΣx(Λξ, Λη, σ, β, αM, t) + r(Λξ, Λη, σ, β, t)*cos(β)*ΦΣy(Λξ, Λη, σ, β, αM, t)
d/dt(σ) == -y*ΦΣx + x*ΦΣy
fβ(Λξ, Λη, σ, β, αM, t) := σ/r(Λξ, Λη, σ, β, t)^2 - nS
d/dt(β) == σ/r^2 - d/dt(φ)
fαM(Λξ, Λη, σ, β, αM, t) := nM - nS
DD(t, D) := [
    fΛξ(D[0], D[1], D[2], D[3], D[4], t);
    fΛη(D[0], D[1], D[2], D[3], D[4], t);
    fσ(D[0], D[1], D[2], D[3], D[4], t);
    fβ(D[0], D[1], D[2], D[3], D[4], t);
    fαM(D[0], D[1], D[2], D[3], D[4], t)
]
βoo := -0.196452877182
rp0 := 6571*km*unitR^-1
rα := 1.148*10^6*km*unitR^-1
rα := 3.03506127086
ecc0 := (rα - rp0)/(rp0 + rα)
a0 := (rp0 + rα)/2
p0 := a0*(1 - ecc0^2)
[-0.196452877182; 3.03506127086; -2.56995774149; 21.2653181424]
σ0 := sqrt(p0)
αM0 := -2.56995774149
-0.152556002239
D00 := [ecc0*cos(βoo); ecc0*sin(βoo); σ0; βoo; αM0]
atan2(ecc0*cos(βoo), ecc0*sin(βoo)) =  # no stored result
fΛξ(D00[0], D00[1], D00[2], D00[3], D00[4], 0) =  # no stored result
tf := 90.039504974*day*unitT^-1  # disabled
fΛη(D00[0], D00[1], D00[2], D00[3], D00[4], 0) =  # no stored result
tf := 21.2653181424
fβ(D00[0], D00[1], D00[2], D00[3], D00[4], 0) =  # no stored result
U := rkadapt(D00, 0, tf, 10^-9, DD, 10^4, 10^-15)  # disabled
vy(D00[0], D00[1], D00[2], D00[3], 0)*unitV =  # no stored result
U := BDF(D00, 0, tf, 10^4, DD, 10^-9)
r(D00[0], D00[1], D00[2], D00[3], 0)*unitR =  # no stored result
p_s :=
    for i ∈ 0, 1 .. rows(U) - 1
        p_s[i] ← U[:, 3][i]^2
    p_s  # disabled
eccs :=
    for i ∈ 0, 1 .. rows(U) - 1
        eccs[i] ← sqrt(U[:, 1][i]^2 + U[:, 2][i]^2)
    eccs  # disabled
rp_s :=
    for i ∈ 0, 1 .. rows(U) - 1
        rp_s[i] ← p_s[i]/(1 + eccs[i])
    rp_s  # disabled
a_s :=
    for i ∈ 0, 1 .. rows(U) - 1
        a_s[i] ← p_s[i]/(1 - eccs[i]^2)
    a_s  # disabled
ωωs :=
    for i ∈ 0, 1 .. rows(U) - 1
        ωωs[i] ← atan2(U[:, 1][i], U[:, 2][i])
    ωωs  # disabled
φS1 :=
    for i ∈ 0, 1 .. rows(U) - 1
        φS[i] ← nS*U[:, 0][i]
    φS  # disabled
rcs :=
    for i ∈ 0, 1 .. rows(U) - 1
        rcs[i] ← r(U[:, 1][i], U[:, 2][i], U[:, 3][i], U[:, 4][i], U[:, 0][i])
    rcs  # disabled
υs :=
    for i ∈ 0, 1 .. rows(U) - 1
        υs[i] ← U[:, 4][i] + φS1[i] - ωωs[i]
    υs  # disabled
ras :=
    for i ∈ 0, 1 .. rows(U) - 1
        ra_s[i] ← p_s[i]/(1 + (-eccs[i]))
    ra_s  # disabled
# [plot: rcs vs U[:, 0]]
# [plot: U[:, 3] vs U[:, 0]]
# [plot: U[:, 1] vs U[:, 0]]
# [plot: U[:, 2] vs U[:, 0]]
# [plot: eccs vs U[:, 0]]
-y*(vy + nS*x)*Φx + (x*(vy + nS*x) + nS*(x^2 + y^2) + vy*x - vx*y)*Φy
(y*(vx - nS*y) - nS*(x^2 + y^2) - vy*x + vx*y)*Φx + (-(x*(vx - nS*y))*Φy)
cos(φ(t))*(-y*(vy + nS*x)*Φx + (x*(vy + nS*x) + nS*(x^2 + y^2) + vy*x - vx*y)*Φy) - sin(φ(t))*((y*(vx - nS*y) - nS*(x^2 + y^2) - vy*x + vx*y)*Φx + (-(x*(vx - nS*y))*Φy))
sin(φ(t))*(-y*(vy + nS*x)*Φx + (x*(vy + nS*x) + nS*(x^2 + y^2) + vy*x - vx*y)*Φy) + cos(φ(t))*((y*(vx - nS*y) - nS*(x^2 + y^2) - vy*x + vx*y)*Φx + (-(x*(vx - nS*y))*Φy))
d/dt(Λξ) == (sin(φ)*(nS*(x^2 + y^2) + vy*x - vx*y) - y*(vy*cos(φ) + vx*sin(φ) + nS*(x*cos(φ) - y*sin(φ))))*ΦΣx + (cos(φ)*(nS*(x^2 + y^2) + vy*x - vx*y) + x*(vy*cos(φ) + vx*sin(φ) + nS*(x*cos(φ) - y*sin(φ))))*ΦΣy
fΛξ1(Λξ, Λη, σ, β, αM, t) := cos(φ(t))*(-(r(Λξ, Λη, σ, β, t)*sin(β))*(vy(Λξ, Λη, σ, β, t) + nS*(r(Λξ, Λη, σ, β, t)*cos(β)))*ΦΣx(Λξ, Λη, σ, β, αM, t) + (r(Λξ, Λη, σ, β, t)*cos(β)*(vy(Λξ, Λη, σ, β, t) + nS*(r(Λξ, Λη, σ, β, t)*cos(β))) + nS*(r(Λξ, Λη, σ, β, t)^2) + vy(Λξ, Λη, σ, β, t)*(r(Λξ, Λη, σ, β, t)*cos(β)) - vx(Λξ, Λη, σ, β, t)*(r(Λξ, Λη, σ, β, t)*sin(β)))*ΦΣy(Λξ, Λη, σ, β, αM, t)) + (-sin(φ(t))*((r(Λξ, Λη, σ, β, t)*sin(β)*(vx(Λξ, Λη, σ, β, t) - nS*(r(Λξ, Λη, σ, β, t)*sin(β))) - nS*(r(Λξ, Λη, σ, β, t)^2) - vy(Λξ, Λη, σ, β, t)*(r(Λξ, Λη, σ, β, t)*cos(β)) + vx(Λξ, Λη, σ, β, t)*(r(Λξ, Λη, σ, β, t)*sin(β)))*ΦΣx(Λξ, Λη, σ, β, αM, t) + (-(r(Λξ, Λη, σ, β, t)*cos(β)*(vx(Λξ, Λη, σ, β, t) - nS*(r(Λξ, Λη, σ, β, t)*sin(β))))*ΦΣy(Λξ, Λη, σ, β, αM, t))))
fΛη1(Λξ, Λη, σ, β, αM, t) := sin(φ(t))*(-(r(Λξ, Λη, σ, β, t)*sin(β))*(vy(Λξ, Λη, σ, β, t) + nS*(r(Λξ, Λη, σ, β, t)*cos(β)))*ΦΣx(Λξ, Λη, σ, β, αM, t) + (r(Λξ, Λη, σ, β, t)*cos(β)*(vy(Λξ, Λη, σ, β, t) + nS*(r(Λξ, Λη, σ, β, t)*cos(β))) + nS*(r(Λξ, Λη, σ, β, t)^2) + vy(Λξ, Λη, σ, β, t)*(r(Λξ, Λη, σ, β, t)*cos(β)) - vx(Λξ, Λη, σ, β, t)*(r(Λξ, Λη, σ, β, t)*sin(β)))*ΦΣy(Λξ, Λη, σ, β, αM, t)) + cos(φ(t))*((r(Λξ, Λη, σ, β, t)*sin(β)*(vx(Λξ, Λη, σ, β, t) - nS*(r(Λξ, Λη, σ, β, t)*sin(β))) - nS*(r(Λξ, Λη, σ, β, t)^2) - vy(Λξ, Λη, σ, β, t)*(r(Λξ, Λη, σ, β, t)*cos(β)) + vx(Λξ, Λη, σ, β, t)*(r(Λξ, Λη, σ, β, t)*sin(β)))*ΦΣx(Λξ, Λη, σ, β, αM, t) + (-(r(Λξ, Λη, σ, β, t)*cos(β)*(vx(Λξ, Λη, σ, β, t) - nS*(r(Λξ, Λη, σ, β, t)*sin(β))))*ΦΣy(Λξ, Λη, σ, β, αM, t)))
fΛξ(Λξ, Λη, σ, β, αM, t) := (sin(φ(t))*(nS*(r(Λξ, Λη, σ, β, t)^2) + vy(Λξ, Λη, σ, β, t)*r(Λξ, Λη, σ, β, t)*cos(β) - vx(Λξ, Λη, σ, β, t)*r(Λξ, Λη, σ, β, t)*sin(β)) + (-r(Λξ, Λη, σ, β, t)*sin(β)*(vy(Λξ, Λη, σ, β, t)*cos(φ(t)) + vx(Λξ, Λη, σ, β, t)*sin(φ(t)) + nS*(r(Λξ, Λη, σ, β, t)*cos(β)*cos(φ(t)) - r(Λξ, Λη, σ, β, t)*sin(β)*sin(φ(t))))))*ΦΣx(Λξ, Λη, σ, β, αM, t) + (cos(φ(t))*(nS*(r(Λξ, Λη, σ, β, t)^2) + vy(Λξ, Λη, σ, β, t)*r(Λξ, Λη, σ, β, t)*cos(β) - vx(Λξ, Λη, σ, β, t)*(r(Λξ, Λη, σ, β, t)*sin(β))) + r(Λξ, Λη, σ, β, t)*cos(β)*(vy(Λξ, Λη, σ, β, t)*cos(φ(t)) + vx(Λξ, Λη, σ, β, t)*sin(φ(t)) + nS*(r(Λξ, Λη, σ, β, t)*cos(β)*cos(φ(t)) - r(Λξ, Λη, σ, β, t)*sin(β)*sin(φ(t)))))*ΦΣy(Λξ, Λη, σ, β, αM, t)  # disabled
fΛξ1(D00[0], D00[1], D00[2], D00[3], D00[4], 0.1) =  # no stored result
fΛη1(D00[0], D00[1], D00[2], D00[3], D00[4], 0.1) =  # no stored result
xL2 := -0.211978179097
xL1 := 0.163920369936
ΔrL2 := 1000*km*unitR^-1
rMoon_h := (1738*km + 200*km)*unitR^-1
rM ← rM + |xL2|
f_opt(ββ0, rα0, αm0, ttf) :=
    ecc0 ← (rα0 - rp0)/(rα0 + rp0)
    a00 ← 0.5*(rα0 + rp0)
    σσ0 ← sqrt(a00*(1 - ecc0^2))
    D ← [ecc0*cos(ββ0); ecc0*sin(ββ0); σσ0; ββ0; αm0]
    U ← BDF(D, 0, ttf, 10^4, DD, 10^-11)
    rpf ← U[rows(U) - 1, 3]^2/(1 + sqrt(U[rows(U) - 1, 1]^2 + U[rows(U) - 1, 2]^2))
    rf ← r(U[rows(U) - 1, 1], U[rows(U) - 1, 2], U[rows(U) - 1, 3], U[rows(U) - 1, 4], ttf)
    vrf ← vr(U[rows(U) - 1, 1], U[rows(U) - 1, 2], U[rows(U) - 1, 3], U[rows(U) - 1, 4], ttf)
    vnf ← vn(U[rows(U) - 1, 1], U[rows(U) - 1, 2], U[rows(U) - 1, 3], U[rows(U) - 1, 4], ttf)
    rM ← rM + |xL2|*0.96
    dr_moon ← sqrt(rf^2 + rM^2 - 2*rf*rM*cos(U[rows(U) - 1, 4] - U[rows(U) - 1, 5])) - ΔrL2
    rM ← 1
    dr_moon_1 ← sqrt(rf^2 + rM^2 - 2*rf*rM*cos(U[rows(U) - 1, 4] - U[rows(U) - 1, 5])) - rMoon_h
    f_opt ← [-rpf; rf; vrf; vnf; dr_moon; dr_moon_1]
    f_opt
0.96
1000
[-rpf; rf; vrf; vnf; dr_moon]
f_opt(βoo, rα, αM0, tf) =  # no stored result
f_opt_1(ββ0, rα0, αm0, ttf) := f_opt(ββ0, rα0, αm0, ttf)[0]
dr_constr(ββ0, rα0, αm0, ttf) := f_opt(ββ0, rα0, αm0, ttf)[4]
rα =  # no stored result
dr_constr_1(ββ0, rα0, αm0, ttf) := f_opt(ββ0, rα0, αm0, ttf)[5]
90*day*unitT^-1 =  # no stored result
[ββ0; rα0; αm0; ttf] := [-0.183957205678; 2.96295936099; -2.0386793685; 21.8047234553 + 2.05866576986*0]
-0.192939062 =  # no stored result
Given
[-0.142760536392; 2.98926683932; -2.4457172474; 22.3052313143]
dr_constr(ββ0, rα0, αm0, ttf) ≤ 0  # disabled
dr_constr_1(ββ0, rα0, αm0, ttf) == 0
[-0.165624106877; 2.97595086854; -2.21843716387; 21.6297571165]
sol := Minimize(f_opt_1, ββ0, rα0, αm0, ttf)  # disabled
[-0.190328429626; 2.95802626777; -1.93406680732; 21.848869401]
[-0.142760536392; 2.98926683932; -2.4457172474; 22.3052313143]
[-0.192939062; 3.02557885748; -2.46747710567; 21.62744732]
[-0.196452877182; 3.03506127086; -2.56995774149; 21.2653181424]
[-0.272595161484; 2.98336227723; -1.42169244522; 20.8691314238]
sol =  # no stored result
[-0.183957205678; 2.96295936099; -2.0386793685; 21.8047234553]
[-0.18412828203; 2.96361949131; -2.04295173307; 21.7932152388]
# best solution
sol := [-0.183957205678; 2.96295936099; -2.0386793685; 21.8047234553]
sqrt(1/(|xL2| + 1)) =  # no stored result
f_opt(sol[0], sol[1], sol[2], sol[3]) =  # no stored result
# 0.96*|xL2| | 1000*km
[-0.18412828203; 2.96361949131; -2.04295173307; 21.7932152388]
1.04125997451 - sqrt(1/(|xL2| + 1)) =  # no stored result
0.642730869584*km/s
200*km
sol[3]*unitT =  # no stored result
[-0.183957205678; 2.96295936099; -2.0386793685; 21.8047234553]
-2.0386793685 =  # no stored result
traj :=
    ecc0 ← (sol[1] - rp0)/(sol[1] + rp0)
    a00 ← 0.5*(sol[1] + rp0)
    σσ0 ← sqrt(a00*(1 - ecc0^2))
    D ← [ecc0*cos(sol[0]); ecc0*sin(sol[0]); σσ0; sol[0]; sol[2]]
    U ← BDF(D, 0, sol[3], 10^4, DD, 10^-11)
-0.183957205678 =  # no stored result
2.96295936099*unitR =  # no stored result
-2.0386793685 =  # no stored result
p_s :=
    for i ∈ 0, 1 .. rows(traj) - 1
        p_s[i] ← traj[:, 3][i]^2
    p_s
eccs :=
    for i ∈ 0, 1 .. rows(traj) - 1
        eccs[i] ← sqrt(traj[:, 1][i]^2 + traj[:, 2][i]^2)
    eccs
rp_s :=
    for i ∈ 0, 1 .. rows(traj) - 1
        rp_s[i] ← p_s[i]/(1 + eccs[i])
    rp_s
a_s :=
    for i ∈ 0, 1 .. rows(traj) - 1
        a_s[i] ← p_s[i]/(1 - eccs[i]^2)
    a_s
ωωs :=
    for i ∈ 0, 1 .. rows(traj) - 1
        ωωs[i] ← atan2(traj[:, 1][i], traj[:, 2][i])
    ωωs
φS1 :=
    for i ∈ 0, 1 .. rows(traj) - 1
        φS[i] ← nS*traj[:, 0][i]
    φS
rcs :=
    for i ∈ 0, 1 .. rows(traj) - 1
        rcs[i] ← r(traj[:, 1][i], traj[:, 2][i], traj[:, 3][i], traj[:, 4][i], traj[:, 0][i])
    rcs
υs :=
    for i ∈ 0, 1 .. rows(traj) - 1
        υs[i] ← traj[:, 4][i] + φS1[i] - ωωs[i]
    υs
β0_s :=
    for i ∈ 0, 1 .. rows(traj) - 1
        β0_s[i] ← nS*traj[:, 0][i] + traj[:, 4][i]
    β0_s
ras :=
    for i ∈ 0, 1 .. rows(traj) - 1
        ra_s[i] ← p_s[i]/(1 + (-eccs[i]))
    ra_s
rM_s :=
    for i ∈ 0, 1 .. rows(traj) - 1
        rM_s[i] ← 1
    rM_s
αM_s :=
    for i ∈ 0, 1 .. rows(traj) - 1
        αM_s[i] ← nS*traj[:, 0][i] + traj[:, 5][i]
    αM_s
vxa_vya :=
    vrf ← vr(traj[rows(traj) - 1, 1], traj[rows(traj) - 1, 2], traj[rows(traj) - 1, 3], traj[rows(traj) - 1, 4], sol[3])
    vnf ← vn(traj[rows(traj) - 1, 1], traj[rows(traj) - 1, 2], traj[rows(traj) - 1, 3], traj[rows(traj) - 1, 4], sol[3])
    φφ ← traj[rows(traj) - 1, 4] + nS*traj[rows(traj) - 1, 0]
    avec ← [cos(φφ), -sin(φφ); sin(φφ), cos(φφ)]*[vrf; vnf]
    avec
vxa_vya =  # no stored result
vmoon_f := [0; 0; 1]×[1*cos(αM_s[rows(αM_s) - 1]); 1*sin(αM_s[rows(αM_s) - 1]); 0]
h_moon_ :=
    for i ∈ 0, 1 .. rows(traj) - 1
        v_moon ← [0; 0; 1]×[1*cos(αM_s[i]); 1*sin(αM_s[i]); 0]
        vrf ← vr(traj[i, 1], traj[i, 2], traj[i, 3], traj[i, 4], traj[i, 0])
        vnf ← vn(traj[i, 1], traj[i, 2], traj[i, 3], traj[i, 4], traj[i, 0])
        φφ ← traj[i, 4] + nS*traj[i, 0]
        avec ← [cos(φφ), -sin(φφ); sin(φφ), cos(φφ)]*[vrf; vnf]
        v2moon ← [avec[0] - v_moon[0]; avec[1] - v_moon[1]]
        rf ← r(traj[i, 1], traj[i, 2], traj[i, 3], traj[i, 4], traj[i, 0])
        r2moon ← sqrt(rf^2 + rM^2 - 2*rf*rM*cos(traj[i, 4] - traj[i, 5]))
        hmoon[i] ← |v2moon|^2 - 2*μM/r2moon
    hmoon
# [plot: rcs vs traj[:, 0]]
# [plot: rp_s vs traj[:, 0]]
# [polar plot: traj[:, 4], rcs]
# [plot: ras vs traj[:, 0]]
# [plot: eccs vs traj[:, 0]]
# [plot: a_s vs traj[:, 0]]
# [plot: traj[:, 4] vs traj[:, 0]]
# [plot: a_s vs eccs]
# [polar plot: β0_s, αM_s, αM_s[0], αM_s[rows(traj) - 1], 0, φS1[rows(traj) - 1], rcs, rM_s, rM_s[0], rM_s[rows(traj) - 1], 4, 1 + |xL2|]
# [plot: h_moon_ vs traj[:, 0]]
rcs_neg_h_moon :=
    kk ← 0
    for i ∈ 0, 1 .. rows(traj) - 1
        if h_moon_[i] ≤ 0
            ccv[kk, 0] ← rcs[i]
            ccv[kk, 1] ← β0_s[i]
            kk ← kk + 1
        else
            continue
    ccv
# [polar plot: β0_s, αM_s, αM_s[0], αM_s[rows(traj) - 1], 0, φS1[rows(traj) - 1], rcs_neg_h_moon[:, 1], rcs, rM_s, rM_s[0], rM_s[rows(traj) - 1], 4, 1 + |xL2|, rcs_neg_h_moon[:, 0]]
Δtf := 30*day*unitT^-1
23.8633892252 - sol[3] =  # no stored result
(sol[3] + Δtf)*unitT =  # no stored result
23.8633892252*unitT =  # no stored result
2.05866576986*unitT =  # no stored result
traj_1 :=
    kΔtf ← 1
    D ← [
        traj[rows(traj) - 1, 1];
        traj[rows(traj) - 1, 2];
        traj[rows(traj) - 1, 3];
        traj[rows(traj) - 1, 4];
        traj[rows(traj) - 1, 5]
    ]
    U ← BDF(D, sol[3], sol[3] + kΔtf*Δtf, 10^4, DD, 10^-11)
rcs_1 :=
    for i ∈ 0, 1 .. rows(traj_1) - 1
        rcs[i] ← r(traj_1[:, 1][i], traj_1[:, 2][i], traj_1[:, 3][i], traj_1[:, 4][i], traj_1[:, 0][i])
    rcs
β0_s_1 :=
    for i ∈ 0, 1 .. rows(traj_1) - 1
        β0_s[i] ← nS*traj_1[:, 0][i] + traj_1[:, 4][i]
    β0_s
h_moon_1 :=
    for i ∈ 0, 1 .. rows(traj_1) - 1
        v_moon ← [0; 0; 1]×[1*cos(traj_1[:, 5][i] + nS*traj_1[:, 0][i]); 1*sin(traj_1[:, 5][i] + nS*traj_1[:, 0][i]); 0]
        vrf ← vr(traj_1[i, 1], traj_1[i, 2], traj_1[i, 3], traj_1[i, 4], traj_1[i, 0])
        vnf ← vn(traj_1[i, 1], traj_1[i, 2], traj_1[i, 3], traj_1[i, 4], traj_1[i, 0])
        φφ ← traj_1[i, 4] + nS*traj_1[i, 0]
        avec ← [cos(φφ), -sin(φφ); sin(φφ), cos(φφ)]*[vrf; vnf]
        v2moon ← [avec[0] - v_moon[0]; avec[1] - v_moon[1]]
        rf ← r(traj_1[i, 1], traj_1[i, 2], traj_1[i, 3], traj_1[i, 4], traj_1[i, 0])
        r2moon ← sqrt(rf^2 + rM^2 - 2*rf*rM*cos(traj_1[i, 4] - traj_1[i, 5]))
        hmoon[i] ← |v2moon|^2 - 2*μM/r2moon
    hmoon
r2Moon_1 :=
    for i ∈ 0, 1 .. rows(traj_1) - 1
        rf ← r(traj_1[i, 1], traj_1[i, 2], traj_1[i, 3], traj_1[i, 4], traj_1[i, 0])
        r2moon[i] ← sqrt(rf^2 + rM^2 - 2*rf*rM*cos(traj_1[i, 4] - traj_1[i, 5]))
    r2moon
r2Moon :=
    for i ∈ 0, 1 .. rows(traj) - 1
        rf ← r(traj[i, 1], traj[i, 2], traj[i, 3], traj[i, 4], traj[i, 0])
        r2moon[i] ← sqrt(rf^2 + rM^2 - 2*rf*rM*cos(traj[i, 4] - traj[i, 5]))
    r2moon
# [polar plot: β0_s, αM_s, αM_s[0], αM_s[rows(traj) - 1], 0, φS1[rows(traj) - 1], rcs_neg_h_moon[:, 1], β0_s_1, rcs, rM_s, rM_s[0], rM_s[rows(traj) - 1], 4, 1 + |xL2|, rcs_neg_h_moon[:, 0], rcs_1]
# [plot: h_moon_1 vs traj_1[:, 0]]
# [plot: h_moon_, h_moon_1 vs traj[:, 0], traj_1[:, 0]]
rMoon_h =  # no stored result
jj := 0, 1 .. rows(traj_1) - 1
r2Moon_1[rows(traj_1) - 1] - rMoon_h =  # no stored result
r2Moon_req[jj] := rMoon_h
(r2Moon_1[rows(traj_1) - 1] - rMoon_h)*unitR =  # no stored result
# [plot: r2Moon_1 - r2Moon_req vs traj_1[:, 0]]
# [plot: r2Moon, r2Moon_1 vs traj[:, 0], traj_1[:, 0]]
1738*km*unitR^-1 =  # no stored result
# 23.8632763461 | 23.8624638647
traj_1[0, 0] =  # no stored result
traj_1[rows(traj_1) - 1, 0] =  # no stored result
f_r2Moon_1_ttf(tttf) := linterp(traj_1[:, 0], r2Moon_1 - rMoon_h, tttf)
f_r2Moon_1_ttf(traj_1[rows(traj_1) - 1, 0]) =  # no stored result
tttf_zero_h := root(f_r2Moon_1_ttf(tttf), tttf, 23.863, 23.9)  # disabled
23.9329270297
tttf_zero_h := root(f_r2Moon_1_ttf(tttf), tttf, 23.862, 23.863)
# [plot: traj_1[:, 4] + nS*traj_1[:, 0] vs traj_1[:, 0]]
v2Moon_1 :=
    for i ∈ 0, 1 .. rows(traj_1) - 1
        v_moon ← [0; 0; 1]×[1*cos(traj_1[:, 5][i] + nS*traj_1[:, 0][i]); 1*sin(traj_1[:, 5][i] + nS*traj_1[:, 0][i]); 0]
        vrf ← vr(traj_1[i, 1], traj_1[i, 2], traj_1[i, 3], traj_1[i, 4], traj_1[i, 0])
        vnf ← vn(traj_1[i, 1], traj_1[i, 2], traj_1[i, 3], traj_1[i, 4], traj_1[i, 0])
        φφ ← traj_1[i, 4] + nS*traj_1[i, 0]
        avec ← [cos(φφ), -sin(φφ); sin(φφ), cos(φφ)]*[vrf; vnf]
        v2moon ← [avec[0] - v_moon[0]; avec[1] - v_moon[1]]
        yv[i, 0] ← v2moon[0]
        yv[i, 1] ← v2moon[1]
    yv
r2Moon_xy :=
    for i ∈ 0, 1 .. rows(traj_1) - 1
        rf ← r(traj_1[i, 1], traj_1[i, 2], traj_1[i, 3], traj_1[i, 4], traj_1[i, 0])
        φφ ← traj_1[i, 4] + nS*traj_1[i, 0]
        rvec ← [cos(φφ), -sin(φφ); sin(φφ), cos(φφ)]*[rf; 0]
        rmoonvec ← [1*cos(traj_1[:, 5][i] + nS*traj_1[:, 0][i]); 1*sin(traj_1[:, 5][i] + nS*traj_1[:, 0][i])]
        r2M_vec ← rvec - rmoonvec
        yv[i, 0] ← r2M_vec[0]
        yv[i, 1] ← r2M_vec[1]
    yv
# [plot: r2Moon_xy[:, 1] vs r2Moon_xy[:, 0]]
v2Moon_1_x(tttf) := linterp(traj_1[:, 0], v2Moon_1[:, 0], tttf)
v2Moon_1_y(tttf) := linterp(traj_1[:, 0], v2Moon_1[:, 1], tttf)
x2Moon_1(tttf) := linterp(traj_1[:, 0], r2Moon_xy[:, 0], tttf)
sqrt(μM/(1928*km*unitR^-1)) =  # no stored result
y2Moon_1(tttf) := linterp(traj_1[:, 0], r2Moon_xy[:, 1], tttf)
# [plot: r2Moon_xy[:, 1], y2Moon_1(tttf_zero_h) vs r2Moon_xy[:, 0], x2Moon_1(tttf_zero_h)]
v2Moon_C(tttf) := ([0; 0; 1]×([x2Moon_1(tttf); y2Moon_1(tttf); 0]/sqrt(x2Moon_1(tttf)^2 + y2Moon_1(tttf)^2)))*sqrt(μM/sqrt(x2Moon_1(tttf)^2 + y2Moon_1(tttf)^2))
v2Moon_C(tttf_zero_h) =  # no stored result
[v2Moon_1_x(tttf_zero_h); v2Moon_1_y(tttf_zero_h); 0] =  # no stored result
ΔVf := [v2Moon_1_x(tttf_zero_h); v2Moon_1_y(tttf_zero_h); 0] - v2Moon_C(tttf_zero_h)
|ΔVf|*unitV =  # no stored result
|[v2Moon_1_x(tttf_zero_h); v2Moon_1_y(tttf_zero_h); 0]|^2 - 2*μM/sqrt(x2Moon_1(tttf_zero_h)^2 + y2Moon_1(tttf_zero_h)^2) =  # no stored result
# 0.642730869584*km/s | 0.634751544374*km/s
ΔV0 :=
    a0 ← 0.5*(rp0 + sol[1])
    hh0 ← -μE/a0
    vC ← sqrt(μE/rp0)
    ΔV0 ← sqrt(2*μE/rp0 + hh0) - vC
    ΔV0
ΔV0 =  # no stored result
ΔV0*unitV =  # no stored result
ΔVΣ := ΔV0*unitV + |ΔVf|*unitV
r2Moon_xy_2 :=
    for i ∈ 0, 1 .. rows(traj_1) - 1
        rf ← r(traj_1[i, 1], traj_1[i, 2], traj_1[i, 3], traj_1[i, 4], traj_1[i, 0])
        φφ ← traj_1[i, 4] + nS*traj_1[i, 0]
        rvec ← [cos(φφ), -sin(φφ); sin(φφ), cos(φφ)]*[rf; 0]
        rmoonvec ← [1*cos(traj_1[:, 5][i] + nS*traj_1[:, 0][i]); 1*sin(traj_1[:, 5][i] + nS*traj_1[:, 0][i])]
        r2M_vec ← rvec - rmoonvec
        r2M_vec ← [
            cos(traj_1[:, 5][i] + nS*traj_1[:, 0][i] - π), sin(traj_1[:, 5][i] + nS*traj_1[:, 0][i] - π);
            -sin(traj_1[:, 5][i] + nS*traj_1[:, 0][i] - π), cos(traj_1[:, 5][i] + nS*traj_1[:, 0][i] - π)
        ]*r2M_vec
        yv[i, 0] ← r2M_vec[0]
        yv[i, 1] ← r2M_vec[1]
    yv
r2Moon_xy_m :=
    for i ∈ 0, 1 .. rows(traj) - 1
        rf ← r(traj[i, 1], traj[i, 2], traj[i, 3], traj[i, 4], traj[i, 0])
        φφ ← traj[i, 4] + nS*traj[i, 0]
        rvec ← [cos(φφ), -sin(φφ); sin(φφ), cos(φφ)]*[rf; 0]
        rmoonvec ← [1*cos(traj[:, 5][i] + nS*traj[:, 0][i]); 1*sin(traj[:, 5][i] + nS*traj[:, 0][i])]
        r2M_vec ← rvec - rmoonvec
        r2M_vec ← [
            cos(traj[:, 5][i] + nS*traj[:, 0][i] - π), sin(traj[:, 5][i] + nS*traj[:, 0][i] - π);
            -sin(traj[:, 5][i] + nS*traj[:, 0][i] - π), cos(traj[:, 5][i] + nS*traj[:, 0][i] - π)
        ]*r2M_vec
        yv[i, 0] ← r2M_vec[0]
        yv[i, 1] ← r2M_vec[1]
    yv
v2Moon_2 :=
    for i ∈ 0, 1 .. rows(traj_1) - 1
        v_moon ← [0; 0; 1]×[1*cos(traj_1[:, 5][i] + nS*traj_1[:, 0][i]); 1*sin(traj_1[:, 5][i] + nS*traj_1[:, 0][i]); 0]
        vrf ← vr(traj_1[i, 1], traj_1[i, 2], traj_1[i, 3], traj_1[i, 4], traj_1[i, 0])
        vnf ← vn(traj_1[i, 1], traj_1[i, 2], traj_1[i, 3], traj_1[i, 4], traj_1[i, 0])
        φφ ← traj_1[i, 4] + nS*traj_1[i, 0]
        avec ← [cos(φφ), -sin(φφ); sin(φφ), cos(φφ)]*[vrf; vnf]
        v2moon ← [avec[0] - v_moon[0]; avec[1] - v_moon[1]]
        v2moon ← [
            cos(traj_1[:, 5][i] + nS*traj_1[:, 0][i] - π), sin(traj_1[:, 5][i] + nS*traj_1[:, 0][i] - π);
            -sin(traj_1[:, 5][i] + nS*traj_1[:, 0][i] - π), cos(traj_1[:, 5][i] + nS*traj_1[:, 0][i] - π)
        ]*v2moon
        yv[i, 0] ← v2moon[0] + 1*r2Moon_xy_2[i, 1]
        yv[i, 1] ← v2moon[1] - 1*r2Moon_xy_2[i, 0]
    yv
v2Moon_m :=
    for i ∈ 0, 1 .. rows(traj) - 1
        v_moon ← [0; 0; 1]×[1*cos(traj[:, 5][i] + nS*traj[:, 0][i]); 1*sin(traj[:, 5][i] + nS*traj[:, 0][i]); 0]
        vrf ← vr(traj[i, 1], traj[i, 2], traj[i, 3], traj[i, 4], traj[i, 0])
        vnf ← vn(traj[i, 1], traj[i, 2], traj[i, 3], traj[i, 4], traj[i, 0])
        φφ ← traj[i, 4] + nS*traj[i, 0]
        avec ← [cos(φφ), -sin(φφ); sin(φφ), cos(φφ)]*[vrf; vnf]
        v2moon ← [avec[0] - v_moon[0]; avec[1] - v_moon[1]]
        v2moon ← [
            cos(traj[:, 5][i] + nS*traj[:, 0][i] - π), sin(traj[:, 5][i] + nS*traj[:, 0][i] - π);
            -sin(traj[:, 5][i] + nS*traj[:, 0][i] - π), cos(traj[:, 5][i] + nS*traj[:, 0][i] - π)
        ]*v2moon
        yv[i, 0] ← v2moon[0] + 1*r2Moon_xy_m[i, 1]
        yv[i, 1] ← v2moon[1] - 1*r2Moon_xy_m[i, 0]
    yv
# [plot: r2Moon_xy_2[:, 1] vs r2Moon_xy_2[:, 0]]
# [plot: r2Moon_xy_m[:, 1], r2Moon_xy_2[:, 1] vs r2Moon_xy_m[:, 0], r2Moon_xy_2[:, 0]]
1/2*(vx^2 + vy^2) - 1/2*nΣ^2*(x^2 + y^2) == μM/sqrt(x^2 + y^2) + μE*(1/sqrt((1 - x)^2 + y^2) + (-x/1)) + CJ
CJ(vx, vy, x, y) := 1/2*(vx^2 + vy^2) - 1/2*nM^2*(x^2 + y^2) - (μM/sqrt(x^2 + y^2) + μE*(1/sqrt((1 - x)^2 + y^2) + (-x/1)))
CJ_m :=
    for i ∈ 0, 1 .. rows(traj) - 1
        cjm[i] ← CJ(v2Moon_m[:, 0][i], v2Moon_m[:, 1][i], r2Moon_xy_m[:, 0][i], r2Moon_xy_m[:, 1][i])
    cjm
CJ_2 :=
    for i ∈ 0, 1 .. rows(traj_1) - 1
        cjm[i] ← CJ(v2Moon_2[:, 0][i], v2Moon_2[:, 1][i], r2Moon_xy_2[:, 0][i], r2Moon_xy_2[:, 1][i])
    cjm
CJ_m[0] =  # no stored result
# [plot: CJ_m vs traj[:, 0]]
# [plot: CJ_m vs traj[:, 0]]
# [plot: CJ_2 vs traj_1[:, 0]]
# [plot: CJ_m, CJ_2 vs traj[:, 0], traj_1[:, 0]]
# [plot: CJ_2 vs traj_1[:, 5]]
tttf_zero_h =  # no stored result
CJ_2[0] =  # no stored result
CJ_2f(tttf) := linterp(traj_1[:, 0], CJ_2, tttf)
# [plot: CJ_2, CJ_2f(tttf_zero_h) vs traj_1[:, 0], tttf_zero_h]
CJ_2f(tttf_zero_h) =  # no stored result
1*[vx; vy]*[3*cos(ββ - αS)*cos(αS)/rS^2 - cos(ββ)/rS^2; 3*cos(ββ - αS)*sin(αS)/rS^2 - sin(ββ)/rS^2]*μS*r/rS == d/dt(CJ)
r2Moon_xy_2
dCJ_dt_2 :=
    for i ∈ 0, 1 .. rows(traj_1) - 1
        ββc ← atan2(r2Moon_xy_2[i, 0], r2Moon_xy_2[i, 1])
        rrc ← sqrt(r2Moon_xy_2[i, 0]^2 + r2Moon_xy_2[i, 1]^2)
        αSc ← traj_1[:, 5][i] + nS*traj_1[:, 0][i] - π
        dCj_dt_i[i] ← [v2Moon_2[i, 0]; v2Moon_2[i, 1]]*[3*cos(ββc - αSc)*cos(αSc)/rS^2 - cos(ββc)/rS^2; 3*cos(ββc - αSc)*sin(αSc)/rS^2 - sin(ββc)/rS^2]*μS*rrc/rS
    dCj_dt_i
βββM :=
    for i ∈ 0, 1 .. rows(traj_1) - 1
        ββc[i] ← atan2(r2Moon_xy_2[i, 0], r2Moon_xy_2[i, 1])
    ββc
# [plot: βββM*rad/deg vs traj_1[:, 0]]
# [plot: dCJ_dt_2 vs traj_1[:, 0]]
# [plot: dCJ_dt_2 vs traj_1[:, 0]]
hcc := 10^-3
CJ_2f(tttf)
dCJ_2f(tttf) := (2*hcc)^-1*(CJ_2f(tttf + hcc) - CJ_2f(tttf - hcc))
dCJ_dt_2_1 :=
    for i ∈ 0, 1 .. rows(traj_1) - 1
        dcj[i] ← dCJ_2f(traj_1[i, 0])
    dcj
dCJ_2f(23.8) =  # no stored result
# [plot: dCJ_dt_2_1, dCJ_dt_2*20 vs traj_1[:, 0]]
1/2*(vx^2 + vy^2) - 1/2*nS^2*((r*cos(β))^2 + (r*sin(β))^2) == μE/sqrt((r*cos(β))^2 + (r*sin(β))^2) + μS/rS^3*((r*cos(β))^2 - 1/2*(r*sin(β))^2) + CJ
CJ_E2S_f(vx, vy, r, β) := 1/2*(vx^2 + vy^2) - 1/2*nS^2*((r*cos(β))^2 + (r*sin(β))^2) - (μE/sqrt((r*cos(β))^2 + (r*sin(β))^2) + μS/rS^3*((r*cos(β))^2 - 1/2*(r*sin(β))^2))
CJ_E2S :=
    for i ∈ 0, 1 .. rows(traj_1) - 1
        rcs ← r(traj_1[:, 1][i], traj_1[:, 2][i], traj_1[:, 3][i], traj_1[:, 4][i], traj_1[:, 0][i])
        βc ← traj_1[:, 4][i]
        vxc ← vx(traj_1[:, 1][i], traj_1[:, 2][i], traj_1[:, 3][i], traj_1[:, 4][i], traj_1[:, 0][i])
        vyc ← vy(traj_1[:, 1][i], traj_1[:, 2][i], traj_1[:, 3][i], traj_1[:, 4][i], traj_1[:, 0][i])
        cjj[i] ← CJ_E2S_f(vxc, vyc, rcs, βc)
    cjj
CJ_E2S_m :=
    for i ∈ 0, 1 .. rows(traj) - 1
        rcs ← r(traj[:, 1][i], traj[:, 2][i], traj[:, 3][i], traj[:, 4][i], traj[:, 0][i])
        βc ← traj[:, 4][i]
        vxc ← vx(traj[:, 1][i], traj[:, 2][i], traj[:, 3][i], traj[:, 4][i], traj[:, 0][i])
        vyc ← vy(traj[:, 1][i], traj[:, 2][i], traj[:, 3][i], traj[:, 4][i], traj[:, 0][i])
        cjj[i] ← CJ_E2S_f(vxc, vyc, rcs, βc)
    cjj
# [plot: CJ_E2S, CJ_E2S_m vs traj_1[:, 0], traj[:, 0]]
# [plot: CJ_E2S vs traj_1[:, 0]]
ΦΣx(Λξ, Λη, σ, β, αM, t) := μM*((rM*cos(αM) - r(Λξ, Λη, σ, β, t)*cos(β))/sqrt(r(Λξ, Λη, σ, β, t)^2 - 2*cos(αM - β)*r(Λξ, Λη, σ, β, t)*rM + rM^2)^3 - 1*cos(αM)/rM^3) + μS*2*cos(β)*r(Λξ, Λη, σ, β, t)/rS^3  # disabled
ΦΣy(Λξ, Λη, σ, β, αM, t) := μM*((rM*sin(αM) - r(Λξ, Λη, σ, β, t)*sin(β))/sqrt(r(Λξ, Λη, σ, β, t)^2 - 2*cos(αM - β)*r(Λξ, Λη, σ, β, t)*rM + rM^2)^3 - rM*sin(αM)/rM^3) + μS*(-sin(β))*r(Λξ, Λη, σ, β, t)/rS^3  # disabled
dCJ_E2S_dt(Λξ, Λη, σ, β, αM, t) := μM*[vx(Λξ, Λη, σ, β, t); vy(Λξ, Λη, σ, β, t)]*[
    (rM*cos(αM) - r(Λξ, Λη, σ, β, t)*cos(β))/sqrt(r(Λξ, Λη, σ, β, t)^2 - 2*cos(αM - β)*r(Λξ, Λη, σ, β, t)*rM + rM^2)^3 - 1*cos(αM)/rM^3;
    (rM*sin(αM) - r(Λξ, Λη, σ, β, t)*sin(β))/sqrt(r(Λξ, Λη, σ, β, t)^2 - 2*cos(αM - β)*r(Λξ, Λη, σ, β, t)*rM + rM^2)^3 - rM*sin(αM)/rM^3
]
dCJ_E2S_dt_1 :=
    for i ∈ 0, 1 .. rows(traj_1) - 1
        dcj_e2s[i] ← dCJ_E2S_dt(traj_1[:, 1][i], traj_1[:, 2][i], traj_1[:, 3][i], traj_1[:, 4][i], traj_1[:, 5][i], traj_1[:, 0][i])
    dcj_e2s
# [plot: dCJ_E2S_dt_1 vs traj_1[:, 0]]
# [plot: CJ_E2S vs traj_1[:, 0]]
dCJ_E2S_dt_2(tttf) := linterp(traj_1[:, 0], dCJ_E2S_dt_1, tttf)
CJ_E2S_ff(tttf) := linterp(traj_1[:, 0], CJ_E2S, tttf)
dCJ_E2S_dt_2cd(tttf) := 1/(2*hcc)*(CJ_E2S_ff(tttf + hcc) - CJ_E2S_ff(tttf - hcc))
dCJ_E2S_dt_2(23.87) =  # no stored result
dCJ_E2S_dt_2cd(23.87) =  # no stored result
ttfff := 23, 23.0001 .. 24
# [plot: dCJ_E2S_dt_1, dCJ_E2S_dt_2cd(ttfff) vs traj_1[:, 0], ttfff]
tttf_zero_h =  # no stored result
0.01*unitT =  # no stored result
# [plot: dCJ_E2S_dt_1, dCJ_E2S_dt_2(tttf_zero_h) vs traj_1[:, 0], tttf_zero_h]
# [plot: CJ_E2S, CJ_E2S_ff(tttf_zero_h) vs traj_1[:, 0], tttf_zero_h]
