[cos(φ), -sin(φ); sin(φ), cos(φ)]
rS*[cos(φs); sin(φs)]
transpose([cos(φ), -sin(φ); sin(φ), cos(φ)])*(rS*[cos(φs); sin(φs)]) → [rS*cos(φ)*cos(φs) + rS*sin(φ)*sin(φs); rS*cos(φ)*sin(φs) - rS*sin(φ)*cos(φs)]
ΦS == μS*(([rS*cos(φ)*cos(φs) + rS*sin(φ)*sin(φs); rS*cos(φ)*sin(φs) - rS*sin(φ)*cos(φs)] - [r; 0])/sqrt((rS*cos(φ)*cos(φs) + rS*sin(φ)*sin(φs) - r)^2 + (rS*cos(φ)*sin(φs) - rS*sin(φ)*cos(φs))^2)^3 + (-1*[rS*cos(φ)*cos(φs) + rS*sin(φ)*sin(φs); rS*cos(φ)*sin(φs) - rS*sin(φ)*cos(φs)]/rS^3))
(rS*cos(φ)*cos(φs) + rS*sin(φ)*sin(φs) - r)^2 + (rS*cos(φ)*sin(φs) - rS*sin(φ)*cos(φs))^2 simplify → r^2 - 2*cos(φ - φs)*r*rS + rS^2
# We consider our controllable motion in a polar coordinat system
# our state vector
# vr vn r φ m φm φs
# vr - radial velocity, vn -transversal velocity, r - radi vector, φ - polar angle
# m - mass of a SC, φm - polar angle describing motion of the Moon
# φs - polar angle describing motion of the Sun
# Perturbation (acceleration) from the Sun
ΦS == μS*([rS*cos(φ - φs) - r; -rS*sin(φ - φs)]/sqrt(r^2 - 2*cos(φ - φs)*r*rS + rS^2)^3 + (-1*[rS*cos(φ - φs); -rS*sin(φ - φs)]/rS^3))
[rS*cos(φ)*cos(φs) + rS*sin(φ)*sin(φs); rS*cos(φ)*sin(φs) - rS*sin(φ)*cos(φs)] simplify → [rS*cos(φ - φs); -rS*sin(φ - φs)]
# Perturbation (acceleration) from the Moon
ΦM == μS*([rM*cos(φ - φm) - r; -rM*sin(φ - φm)]/sqrt(r^2 - 2*cos(φ - φm)*r*rM + rM^2)^3 + (-1*[rM*cos(φ - φm); -rM*sin(φ - φm)]/rM^3))
μS*([cos(φ - φs) - εr; -1*sin(φ - φs)]/(rS^2*sqrt(εr^2 - 2*cos(φ - φs)*εr + 1)^3) + (-1*[cos(φ - φs); -1*sin(φ - φs)]/rS^2))
d/dεr(μS*([cos(φ - φs) - εr; -1*sin(φ - φs)]/(rS^2*sqrt(εr^2 - 2*cos(φ - φs)*εr + 1)^3) + (-1*[cos(φ - φs); -1*sin(φ - φs)]/rS^2))) → [
    -μS*(1/(rS^2*(εr^2 - 2*cos(φ - φs)*εr + 1)^(3/2)) - 3*(2*εr - 2*cos(φ - φs))*(εr - cos(φ - φs))/(2*rS^2*(εr^2 - 2*cos(φ - φs)*εr + 1)^(5/2)));
    3*μS*sin(φ - φs)*(2*εr - 2*cos(φ - φs))/(2*rS^2*(εr^2 - 2*cos(φ - φs)*εr + 1)^(5/2))
]
[
    -μS*(1/(rS^2*(εr^2 - 2*cos(φ - φs)*εr + 1)^(3/2)) - 3*(2*εr - 2*cos(φ - φs))*(εr - cos(φ - φs))/(2*rS^2*(εr^2 - 2*cos(φ - φs)*εr + 1)^(5/2)));
    3*μS*sin(φ - φs)*(2*εr - 2*cos(φ - φs))/(2*rS^2*(εr^2 - 2*cos(φ - φs)*εr + 1)^(5/2))
] substitute, εr == 0 → [(μS + 3*μS*cos(2*φ - 2*φs))/(2*rS^2); -3*μS*cos(φ - φs)*sin(φ - φs)/rS^2]
[(μS + 3*μS*cos(2*φ - 2*φs))/(2*rS^2); -3*μS*cos(φ - φs)*sin(φ - φs)/rS^2] collect, μS → [(3*cos(2*φ - 2*φs) + 1)/(2*rS^2)*μS; (-3*cos(φ - φs)*sin(φ - φs)/rS^2)*μS]
[(μS + 3*μS*cos(2*φ - 2*φs))/(2*rS^2); -3*μS*cos(φ - φs)*sin(φ - φs)/rS^2] simplify → [(2*μS + 3*μS*(cos(φ - φs)^2 - 1))/rS^2; -3*μS*sin(2*φ - 2*φs)/(2*rS^2)]
[0; 0] + [(3*cos(2*φ - 2*φs) + 1)/2; (-3*sin(2*φ - 2*φs)/2)]*r/rS^3*μS
ΦS == [(3*cos(2*φ - 2*φs) + 1)/2; (-3*sin(2*φ - 2*φs)/2)]*r/rS^3*μS
ΦM == μM*([rM*cos(φ - φm) - r; -rM*sin(φ - φm)]/sqrt(r^2 - 2*cos(φ - φm)*r*rM + rM^2)^3 + (-1*[rM*cos(φ - φm); -rM*sin(φ - φm)]/rM^3))
d/dt(vr) == vn^2/r - μE/r^2 + δ_*P/m_*cos(θ) + μM*((rM*cos(φ - φm) - r)/sqrt(r^2 - 2*cos(φ - φm)*r*rM + rM^2)^3 + (-1*(rM*cos(φ - φm))/rM^3)) + (3*cos(2*φ - 2*φs) + 1)/2*r/rS^3*μS
d/dt(vn) == -vr*vn/r + δ_*P/m_*sin(θ) + (μM*(-rM*sin(φ - φm)/sqrt(r^2 - 2*cos(φ - φm)*r*rM + rM^2)^3 + (-1*(-rM*sin(φ - φm))/rM^3)) + (-3*sin(2*φ - 2*φs)/2*r/rS^3*μS))
d/dt(r) == vr
d/dt(φ) == vn/r
d/dt(m) == -δ_*P/w
# nM , nS - a mean motion of the Moon and Sun
d/dt(φm) == nM
d/dt(φS) == nS
H == ψvr*(d/dt(vr)) + ψvn*(d/dt(vn)) + □ + □ + □ + □
Hfunc == ψvr*(vn^2/r - μE/r^2 + δ_*P/m_*cos(θ) + μM*((rM*cos(φ - φm) - r)/sqrt(r^2 - 2*cos(φ - φm)*r*rM + rM^2)^3 + (-1*(rM*cos(φ - φm))/rM^3)) + (3*cos(2*φ - 2*φs) + 1)/2*r/rS^3*μS) + ψvn*(-vr*vn/r + δ_*P/m_*sin(θ) + (μM*(-rM*sin(φ - φm)/sqrt(r^2 - 2*cos(φ - φm)*r*rM + rM^2)^3 + (-1*(-rM*sin(φ - φm))/rM^3)) + (-3*sin(2*φ - 2*φs)/2*r/rS^3*μS))) + ψr*vr + ψφ*(vn/r) + ψm*(-δ_*P/w) + ψφm*nM + ψφS*nS
# Pontryagins function
d/dδ_(ψvr*(vn^2/r - μE/r^2 + δ_*P/m_*cos(θ) + μM*((rM*cos(φ - φm) - r)/sqrt(r^2 - 2*cos(φ - φm)*r*rM + rM^2)^3 + (-1*(rM*cos(φ - φm))/rM^3)) + (3*cos(2*φ - 2*φs) + 1)/2*r/rS^3*μS) + ψvn*(-vr*vn/r + δ_*P/m_*sin(θ) + (μM*(-rM*sin(φ - φm)/sqrt(r^2 - 2*cos(φ - φm)*r*rM + rM^2)^3 + (-1*(-rM*sin(φ - φm))/rM^3)) + (-3*sin(2*φ - 2*φs)/2*r/rS^3*μS))) + ψr*vr + ψφ*(vn/r) + ψm*(-δ_*P/w) + ψφm*nM + ψφS*nS) → P*ψvr*cos(θ)/m_ - P*ψm/w + P*ψvn*sin(θ)/m_
ψvn*cos(θ) - ψvr*sin(θ) == 0
ψvn/sqrt(ψvr^2 + ψvn^2)*cos(θ) - ψvr/sqrt(ψvr^2 + ψvn^2)*sin(θ) == 0
cos(β + θ) == 0
θ == π/2 - β + π*k  # k = 0,1 ...
cos(θ) == sin(β)*(-1)^k == (-1)^k*ψvr/sqrt(ψvr^2 + ψvn^2)
sin(θ) == cos(β)*(-1)^k == (-1)^k*ψvn/sqrt(ψvr^2 + ψvn^2)
# u(t) - opimal control
#
# u(t)=argabsmaxH(x,u,ψ)
# optimal control - we can derive it by maximizing Pontryagins function
# θ - pitch angle
cos(θ) == ψvr/sqrt(ψvr^2 + ψvn^2)
sin(θ) == ψvn/sqrt(ψvr^2 + ψvn^2)  # control (δ,θ)
ψvr*ψvr/sqrt(ψvr^2 + ψvn^2)/m_ - ψm/w + ψvn*ψvn/sqrt(ψvr^2 + ψvn^2)/m_ simplify → (w*ψvr^2 + w*ψvn^2)/(m_*w*sqrt(ψvr^2 + ψvn^2)) - ψm/w
(w*ψvr^2 + w*ψvn^2)/(m_*w*sqrt(ψvr^2 + ψvn^2)) simplify → sqrt(ψvr^2 + ψvn^2)/m_
# δ=1 Π => 0
# δ=0 Π < 0
Π == sqrt(ψvr^2 + ψvn^2)/m_ - ψm/w
# Switching function (optimal) - we switch on our propulsion system whent it is greate or equal then zero and turn it off otherwise
d/dφs(-(ψvr*(vn^2/r - μE/r^2 + δ_*P/m_*cos(θ) + μM*((rM*cos(φ - φm) - r)/sqrt(r^2 - 2*cos(φ - φm)*r*rM + rM^2)^3 + (-1*(rM*cos(φ - φm))/rM^3)) + (3*cos(2*φ - 2*φs) + 1)/2*r/rS^3*μS) + ψvn*(-vr*vn/r + δ_*P/m_*sin(θ) + (μM*(-rM*sin(φ - φm)/sqrt(r^2 - 2*cos(φ - φm)*r*rM + rM^2)^3 + (-1*(-rM*sin(φ - φm))/rM^3)) + (-3*sin(2*φ - 2*φs)/2*r/rS^3*μS))) + ψr*vr + ψφ*(vn/r) + ψm*(-δ_*P/w) + ψφm*nM + ψφs*nS)) → -3*r*μS*ψvn*cos(2*φ - 2*φs)/rS^3 - 3*r*μS*ψvr*sin(2*φ - 2*φs)/rS^3
# The conjugated system of equations - this ODE system describes the change in time of the conguagted variables (functional type lagrange multiplyers)
# It should be added to the main system
ψvr == -d/dvr(H)
ψvn == -d/dvn(H)
d/dt(ψvr) == vn*ψvn/r - ψr
d/dt(ψvn) == vr*ψvn/r - 2*vn*ψvr/r - ψφ/r
d/dt(ψr) == ψvr*(μM*((r^2 - 2*cos(φ - φm)*r*rM + rM^2)^(-3/2) - 3*(r - rM*cos(φ - φm))*(2*r - 2*rM*cos(φ - φm))/(2*(r^2 - 2*cos(φ - φm)*r*rM + rM^2)^(5/2))) - 2*μE/r^3 + vn^2/r^2 - μS*(3*cos(2*φ - 2*φs)/2 + 1/2)/rS^3) - ψvn*(vn*vr/r^2 - 3*μS*sin(2*φ - 2*φs)/(2*rS^3) + 3*rM*μM*sin(φ - φm)*(2*r - 2*rM*cos(φ - φm))/(2*(r^2 - 2*cos(φ - φm)*r*rM + rM^2)^(5/2))) + vn*ψφ/r^2
d/dt(ψφ) == -ψvr*(μM*(sin(φ - φm)/rM^2 - rM*sin(φ - φm)/(r^2 - 2*cos(φ - φm)*r*rM + rM^2)^(3/2) + 3*r*rM*sin(φ - φm)*(r - rM*cos(φ - φm))/(r^2 - 2*cos(φ - φm)*r*rM + rM^2)^(5/2)) - 3*r*μS*sin(2*φ - 2*φs)/rS^3) - ψvn*(μM*(cos(φ - φm)/rM^2 - rM*cos(φ - φm)/(r^2 - 2*cos(φ - φm)*r*rM + rM^2)^(3/2) + 3*r*rM^2*sin(φ - φm)^2/(r^2 - 2*cos(φ - φm)*r*rM + rM^2)^(5/2)) - 3*r*μS*cos(2*φ - 2*φs)/rS^3)
d/dt(ψm) == δ_*P*sqrt(ψvr^2 + ψvn^2)/m_^2
d/dt(ψφm) == μM*ψvr*(sin(φ - φm)/rM^2 - rM*sin(φ - φm)/(r^2 - 2*cos(φ - φm)*r*rM + rM^2)^(3/2) + 3*r*rM*sin(φ - φm)*(r - rM*cos(φ - φm))/(r^2 - 2*cos(φ - φm)*r*rM + rM^2)^(5/2)) + μM*ψvn*(cos(φ - φm)/rM^2 - rM*cos(φ - φm)/(r^2 - 2*cos(φ - φm)*r*rM + rM^2)^(3/2) + 3*r*rM^2*sin(φ - φm)^2/(r^2 - 2*cos(φ - φm)*r*rM + rM^2)^(5/2))
d/dt(ψφs) == -3*r*μS*ψvn*cos(2*φ - 2*φs)/rS^3 - 3*r*μS*ψvr*sin(2*φ - 2*φs)/rS^3
fMS := 1.32712440018*10^11*km^3/s^2
fME := 398600.4*km^3/s^2
fMM := 4902.72*km^3/s^2
AU := 149598500 km
unitR := 384400 km
unitT := sqrt(unitR^3/(fMM + fME)) = 4.34248 day
unitV := unitR*unitT^-1 = 1.02455 km/s
unitAcc := unitV*unitT^-1 = 0.00273074 m/s^2
μS := fMS*unitT^2/unitR^3 = 328901
rS := 1*AU*unitR^-1 = 389.174
μE := fME*unitT^2/unitR^3 = 0.98785
μM := fMM*unitT^2/unitR^3 = 0.0121504
nS := sqrt((fMS + fME*0)/AU^3)*unitT = 0.0746993
nM := sqrt((fMM + fME)/unitR^3)*unitT = 1
rM := 1
μM := 1*μM
μS := 1*μS
unitM := 12 kg
μM = 0.0121504
μS = 328901
unitF := unitM*unitAcc = 0.0327689 N
-1*z/sqrt(x^2 + y^2 + z^2)^3 + Nr/(m_^2*ψm)*ψvz
Nr/(m_^3*ψm)*(ψvx^2 + ψvy^2 + ψvz^2)
P := 5*10^-3*N*unitF^-1 = 0.152584
w := 1500 s*g*unitV^-1 = 14.3575
-Nr*(ψvx^2 + ψvy^2 + ψvz^2)/(2*m_^2*ψm^2)
δc ← 1/2*(Πc/(|Πc| + εδ) + 1)
# rhs of the system describing the optimal motion
rhs(xx) :=
    εδ ← 10^-5
    [vr; vn; r; φ; m_; φm; φs; ψvr; ψvn; ψr; ψφ; ψm; ψφm; ψφs] ← xx
    Πc ← sqrt(ψvr^2 + ψvn^2)/m_ - ψm/w
    δc ← 0
    cosθc ← ψvr/sqrt(ψvr^2 + ψvn^2)
    sinθc ← ψvn/sqrt(ψvr^2 + ψvn^2)
    rhsc ← [
        vn^2/r - μE/r^2 + δc*P/m_*cosθc + μM*((rM*cos(φ - φm) - r)/sqrt(r^2 - 2*cos(φ - φm)*r*rM + rM^2)^3 + (-1*(rM*cos(φ - φm))/rM^3)) + (3*cos(2*φ - 2*φs) + 1)/2*r/rS^3*μS;
        -vr*vn/r + δc*P/m_*sinθc + (μM*(-rM*sin(φ - φm)/sqrt(r^2 - 2*cos(φ - φm)*r*rM + rM^2)^3 + (-1*(-rM*sin(φ - φm))/rM^3)) + (-3*sin(2*φ - 2*φs)/2*r/rS^3*μS));
        vr;
        vn/r;
        -δc*P/w;
        nM;
        nS;
        vn*ψvn/r - ψr;
        vr*ψvn/r - 2*vn*ψvr/r - ψφ/r;
        ψvr*(μM*((r^2 - 2*cos(φ - φm)*r*rM + rM^2)^(-3/2) - 3*(r - rM*cos(φ - φm))*(2*r - 2*rM*cos(φ - φm))/(2*(r^2 - 2*cos(φ - φm)*r*rM + rM^2)^(5/2))) - 2*μE/r^3 + vn^2/r^2 - μS*(3*cos(2*φ - 2*φs)/2 + 1/2)/rS^3) - ψvn*(vn*vr/r^2 - 3*μS*sin(2*φ - 2*φs)/(2*rS^3) + 3*rM*μM*sin(φ - φm)*(2*r - 2*rM*cos(φ - φm))/(2*(r^2 - 2*cos(φ - φm)*r*rM + rM^2)^(5/2))) + vn*ψφ/r^2;
        -ψvr*(μM*(sin(φ - φm)/rM^2 - rM*sin(φ - φm)/(r^2 - 2*cos(φ - φm)*r*rM + rM^2)^(3/2) + 3*r*rM*sin(φ - φm)*(r - rM*cos(φ - φm))/(r^2 - 2*cos(φ - φm)*r*rM + rM^2)^(5/2)) - 3*r*μS*sin(2*φ - 2*φs)/rS^3) - ψvn*(μM*(cos(φ - φm)/rM^2 - rM*cos(φ - φm)/(r^2 - 2*cos(φ - φm)*r*rM + rM^2)^(3/2) + 3*r*rM^2*sin(φ - φm)^2/(r^2 - 2*cos(φ - φm)*r*rM + rM^2)^(5/2)) - 3*r*μS*cos(2*φ - 2*φs)/rS^3);
        δc*P*sqrt(ψvr^2 + ψvn^2)/m_^2;
        μM*ψvr*(sin(φ - φm)/rM^2 - rM*sin(φ - φm)/(r^2 - 2*cos(φ - φm)*r*rM + rM^2)^(3/2) + 3*r*rM*sin(φ - φm)*(r - rM*cos(φ - φm))/(r^2 - 2*cos(φ - φm)*r*rM + rM^2)^(5/2)) + μM*ψvn*(cos(φ - φm)/rM^2 - rM*cos(φ - φm)/(r^2 - 2*cos(φ - φm)*r*rM + rM^2)^(3/2) + 3*r*rM^2*sin(φ - φm)^2/(r^2 - 2*cos(φ - φm)*r*rM + rM^2)^(5/2));
        -3*r*μS*ψvn*cos(2*φ - 2*φs)/rS^3 - 3*r*μS*ψvr*sin(2*φ - 2*φs)/rS^3
    ]
    rhsc
Nr := 0.5*P*w/2 = 0.547682
-1*z/sqrt(x^2 + y^2 + z^2)^3 + Nr/(m_^2*ψm)*ψvz
Nr/(m_^3*ψm)*(ψvx^2 + ψvy^2 + ψvz^2)
-Nr*(ψvx^2 + ψvy^2 + ψvz^2)/(2*m_^2*ψm^2)
rhs(xx) :=
    εδ ← 10^-5
    [vr; vn; r; φ; m_; φm; φs; ψvr; ψvn; ψr; ψφ; ψm; ψφm; ψφs] ← xx
    rhsc ← [
        vn^2/r - μE/r^2 + 1*ψvr + μM*((rM*cos(φ - φm) - r)/sqrt(r^2 - 2*cos(φ - φm)*r*rM + rM^2)^3 + (-1*(rM*cos(φ - φm))/rM^3)) + (3*cos(2*φ - 2*φs) + 1)/2*r/rS^3*μS;
        -vr*vn/r + 1*ψvn + (μM*(-rM*sin(φ - φm)/sqrt(r^2 - 2*cos(φ - φm)*r*rM + rM^2)^3 + (-1*(-rM*sin(φ - φm))/rM^3)) + (-3*sin(2*φ - 2*φs)/2*r/rS^3*μS));
        vr;
        vn/r;
        0;
        nM;
        nS;
        vn*ψvn/r - ψr;
        vr*ψvn/r - 2*vn*ψvr/r - ψφ/r;
        ψvr*(μM*((r^2 - 2*cos(φ - φm)*r*rM + rM^2)^(-3/2) - 3*(r - rM*cos(φ - φm))*(2*r - 2*rM*cos(φ - φm))/(2*(r^2 - 2*cos(φ - φm)*r*rM + rM^2)^(5/2))) - 2*μE/r^3 + vn^2/r^2 - μS*(3*cos(2*φ - 2*φs)/2 + 1/2)/rS^3) - ψvn*(vn*vr/r^2 - 3*μS*sin(2*φ - 2*φs)/(2*rS^3) + 3*rM*μM*sin(φ - φm)*(2*r - 2*rM*cos(φ - φm))/(2*(r^2 - 2*cos(φ - φm)*r*rM + rM^2)^(5/2))) + vn*ψφ/r^2;
        -ψvr*(μM*(sin(φ - φm)/rM^2 - rM*sin(φ - φm)/(r^2 - 2*cos(φ - φm)*r*rM + rM^2)^(3/2) + 3*r*rM*sin(φ - φm)*(r - rM*cos(φ - φm))/(r^2 - 2*cos(φ - φm)*r*rM + rM^2)^(5/2)) - 3*r*μS*sin(2*φ - 2*φs)/rS^3) - ψvn*(μM*(cos(φ - φm)/rM^2 - rM*cos(φ - φm)/(r^2 - 2*cos(φ - φm)*r*rM + rM^2)^(3/2) + 3*r*rM^2*sin(φ - φm)^2/(r^2 - 2*cos(φ - φm)*r*rM + rM^2)^(5/2)) - 3*r*μS*cos(2*φ - 2*φs)/rS^3);
        0;
        μM*ψvr*(sin(φ - φm)/rM^2 - rM*sin(φ - φm)/(r^2 - 2*cos(φ - φm)*r*rM + rM^2)^(3/2) + 3*r*rM*sin(φ - φm)*(r - rM*cos(φ - φm))/(r^2 - 2*cos(φ - φm)*r*rM + rM^2)^(5/2)) + μM*ψvn*(cos(φ - φm)/rM^2 - rM*cos(φ - φm)/(r^2 - 2*cos(φ - φm)*r*rM + rM^2)^(3/2) + 3*r*rM^2*sin(φ - φm)^2/(r^2 - 2*cos(φ - φm)*r*rM + rM^2)^(5/2));
        -3*r*μS*ψvn*cos(2*φ - 2*φs)/rS^3 - 3*r*μS*ψvr*sin(2*φ - 2*φs)/rS^3
    ]
    rhsc  # disabled
rhs(xx) :=
    εδ ← 10^-5
    [vr; vn; r; φ; m_; φm; φs; ψvr; ψvn; ψr; ψφ; ψm; ψφm; ψφs] ← xx
    rhsc ← [
        vn^2/r - μE/r^2 + Nr/(m_^2*ψm)*ψvr + μM*((rM*cos(φ - φm) - r)/sqrt(r^2 - 2*cos(φ - φm)*r*rM + rM^2)^3 + (-1*(rM*cos(φ - φm))/rM^3)) + (3*cos(2*φ - 2*φs) + 1)/2*r/rS^3*μS;
        -vr*vn/r + Nr/(m_^2*ψm)*ψvn + (μM*(-rM*sin(φ - φm)/sqrt(r^2 - 2*cos(φ - φm)*r*rM + rM^2)^3 + (-1*(-rM*sin(φ - φm))/rM^3)) + (-3*sin(2*φ - 2*φs)/2*r/rS^3*μS));
        vr;
        vn/r;
        -Nr*(ψvr^2 + ψvn^2)/(2*m_^2*ψm^2);
        nM;
        nS;
        vn*ψvn/r - ψr;
        vr*ψvn/r - 2*vn*ψvr/r - ψφ/r;
        ψvr*(μM*((r^2 - 2*cos(φ - φm)*r*rM + rM^2)^(-3/2) - 3*(r - rM*cos(φ - φm))*(2*r - 2*rM*cos(φ - φm))/(2*(r^2 - 2*cos(φ - φm)*r*rM + rM^2)^(5/2))) - 2*μE/r^3 + vn^2/r^2 - μS*(3*cos(2*φ - 2*φs)/2 + 1/2)/rS^3) - ψvn*(vn*vr/r^2 - 3*μS*sin(2*φ - 2*φs)/(2*rS^3) + 3*rM*μM*sin(φ - φm)*(2*r - 2*rM*cos(φ - φm))/(2*(r^2 - 2*cos(φ - φm)*r*rM + rM^2)^(5/2))) + vn*ψφ/r^2;
        -ψvr*(μM*(sin(φ - φm)/rM^2 - rM*sin(φ - φm)/(r^2 - 2*cos(φ - φm)*r*rM + rM^2)^(3/2) + 3*r*rM*sin(φ - φm)*(r - rM*cos(φ - φm))/(r^2 - 2*cos(φ - φm)*r*rM + rM^2)^(5/2)) - 3*r*μS*sin(2*φ - 2*φs)/rS^3) - ψvn*(μM*(cos(φ - φm)/rM^2 - rM*cos(φ - φm)/(r^2 - 2*cos(φ - φm)*r*rM + rM^2)^(3/2) + 3*r*rM^2*sin(φ - φm)^2/(r^2 - 2*cos(φ - φm)*r*rM + rM^2)^(5/2)) - 3*r*μS*cos(2*φ - 2*φs)/rS^3);
        Nr/(m_^3*ψm)*(ψvr^2 + ψvn^2);
        μM*ψvr*(sin(φ - φm)/rM^2 - rM*sin(φ - φm)/(r^2 - 2*cos(φ - φm)*r*rM + rM^2)^(3/2) + 3*r*rM*sin(φ - φm)*(r - rM*cos(φ - φm))/(r^2 - 2*cos(φ - φm)*r*rM + rM^2)^(5/2)) + μM*ψvn*(cos(φ - φm)/rM^2 - rM*cos(φ - φm)/(r^2 - 2*cos(φ - φm)*r*rM + rM^2)^(3/2) + 3*r*rM^2*sin(φ - φm)^2/(r^2 - 2*cos(φ - φm)*r*rM + rM^2)^(5/2));
        -3*r*μS*ψvn*cos(2*φ - 2*φs)/rS^3 - 3*r*μS*ψvr*sin(2*φ - 2*φs)/rS^3
    ]
    rhsc  # disabled
jjjj := 0, 1 .. 13
xx0[jjjj] := 0.1
rhs(xx0) = [-98.681; -0.1; 0.1; 1; 0; 1; 0.0746993; 0; -1.1; -196.574; 0.000619081; 0; -0.000451681; -0.0001674]
DD(t, D) := rhs(D)
xL2 := 0.211978179097
xL1 := 0.163920369936
ΔrL2 := 1000 km*unitR^-1 = 0.00260146
(1 + xL2)
rMoon_h := (1738 km + 200 km)*unitR^-1 = 0.00504162
# tf
r(tf)^2 + rM(tf)^2 - 2*r(tf)*rM(tf)*cos(φ(tf) - φm(tf)) - ΔrL2^2 == 0
# Contraint ass with L2 point
# est of distance from SC to L2 point at final momrnt of time tf
vM == [cos(φm), -sin(φm); sin(φm), cos(φm)]*[0; sqrt(μM/rM)]
[cos(φm), -sin(φm); sin(φm), cos(φm)]*[0; sqrt(μMc/rMc)] → [-sin(φm)*sqrt(μMc/rMc); cos(φm)*sqrt(μMc/rMc)]
vM == [-sin(φm)*sqrt(μMc/rMc); cos(φm)*sqrt(μMc/rMc)]
vMr == [cos(φ), -sin(φ); sin(φ), cos(φ)]*[vr; vn] - sqrt(μMc/rMc)*[-sin(φm); cos(φm)]
rMr == sqrt(r^2 + 1 - 2*r*1*cos(φ - φm))
transpose([cos(φ), -sin(φ); sin(φ), cos(φ)]*[vr; vn] - sqrt(μMc/rMc)*[-sin(φm); cos(φm)])*([cos(φ), -sin(φ); sin(φ), cos(φ)]*[vr; vn] - sqrt(μMc/rMc)*[-sin(φm); cos(φm)]) → (vn*cos(φ) - cos(φm)*sqrt(μMc/rMc) + vr*sin(φ))^2 + (sin(φm)*sqrt(μMc/rMc) + vr*cos(φ) - vn*sin(φ))^2
hMoon == (vn*cos(φ) - cos(φm)*sqrt(μMc/rMc) + vr*sin(φ))^2 + (sin(φm)*sqrt(μMc/rMc) + vr*cos(φ) - vn*sin(φ))^2 - 2*μMc/sqrt(r^2 + 1 - 2*r*1*cos(φ - φm))
# Celenocentric energy
lJ == α0*((vnf*cos(φf) - cos(φmf)*sqrt(μMc/rMc) + vrf*sin(φf))^2 + (sin(φmf)*sqrt(μMc/rMc) + vrf*cos(φf) - vnf*sin(φf))^2 - 2*μMc/sqrt(rf^2 + 1 - 2*rf*1*cos(φf - φmf))) + λrL2*(rf^2 + (1 + xL2c)^2 - 2*rf*(1 + xL2c)*cos(φf - φmf) - ΔrL2c^2)
# Terminant function - it contains criterion and boundary constraints of the right end of trajectory
# it contains α0 lagrange multiplier
# we cal let it be equal to α0=1
# also it contains our boundary condition
d/dφms(-(α0*((vnf*cos(φf) - cos(φmf)*sqrt(μMc/rMc) + vrf*sin(φf))^2 + (sin(φmf)*sqrt(μMc/rMc) + vrf*cos(φf) - vnf*sin(φf))^2 - 2*μMc/sqrt(rf^2 + 1 - 2*rf*1*cos(φf - φmf))) + λrL2*(rf^2 + (1 + xL2c)^2 - 2*rf*(1 + xL2c)*cos(φf - φmf) - ΔrL2c^2))) → 0
ψx(tf) == -d/dx(lJ)
# Transvesality conditions at tf
ψvrf == -α0*(2*cos(φf)*(sin(φmf)*sqrt(μMc/rMc) + vrf*cos(φf) - vnf*sin(φf)) + 2*sin(φf)*(vnf*cos(φf) - cos(φmf)*sqrt(μMc/rMc) + vrf*sin(φf)))
ψvnf == -α0*(2*cos(φf)*(vnf*cos(φf) - cos(φmf)*sqrt(μMc/rMc) + vrf*sin(φf)) - 2*sin(φf)*(sin(φmf)*sqrt(μMc/rMc) + vrf*cos(φf) - vnf*sin(φf)))
ψrf == -λrL2*(2*rf - 2*cos(φf - φmf)*(xL2c + 1)) - α0*μMc*(2*rf - 2*cos(φf - φmf))/(rf^2 - 2*cos(φf - φmf)*rf + 1)^(3/2)
ψφf == -α0*(2*(vrf*cos(φf) - vnf*sin(φf))*(vnf*cos(φf) - cos(φmf)*sqrt(μMc/rMc) + vrf*sin(φf)) - 2*(vnf*cos(φf) + vrf*sin(φf))*(sin(φmf)*sqrt(μMc/rMc) + vrf*cos(φf) - vnf*sin(φf)) + 2*rf*μMc*sin(φf - φmf)/(rf^2 - 2*cos(φf - φmf)*rf + 1)^(3/2)) - 2*rf*λrL2*sin(φf - φmf)*(xL2c + 1)
ψmf == 0
ψφmf == 2*rf*λrL2*sin(φf - φmf)*(xL2c + 1) - α0*(2*cos(φmf)*sqrt(μMc/rMc)*(sin(φmf)*sqrt(μMc/rMc) + vrf*cos(φf) - vnf*sin(φf)) + 2*sin(φmf)*sqrt(μMc/rMc)*(vnf*cos(φf) - cos(φmf)*sqrt(μMc/rMc) + vrf*sin(φf)) - 2*rf*μMc*sin(φf - φmf)/(rf^2 - 2*cos(φf - φmf)*rf + 1)^(3/2))
ψφsf == 0
ψrf == -λrL2*(2*rf - 2*cos(φf - φmf)*(xL2c + 1)) - α0*μMc*(2*rf - 2*cos(φf - φmf))/(rf^2 - 2*cos(φf - φmf)*rf + 1)^(3/2) solve, λrL2 → -(ψrf + α0*μMc*(2*rf - 2*cos(φf - φmf))/(rf^2 - 2*cos(φf - φmf)*rf + 1)^(3/2))/(2*rf - 2*cos(φf - φmf)*(xL2c + 1))
λrL2 == -(ψrf + α0*μMc*(2*rf - 2*cos(φf - φmf))/(rf^2 - 2*cos(φf - φmf)*rf + 1)^(3/2))/(2*rf - 2*cos(φf - φmf)*(xL2c + 1))
# Boundary condiotion of our problem on its right end (boundary for state,
# and actial necessary conditions of optimality)
ψvrf == -α0*(2*cos(φf)*(sin(φmf)*sqrt(μMc/rMc) + vrf*cos(φf) - vnf*sin(φf)) + 2*sin(φf)*(vnf*cos(φf) - cos(φmf)*sqrt(μMc/rMc) + vrf*sin(φf)))
ψvnf == -α0*(2*cos(φf)*(vnf*cos(φf) - cos(φmf)*sqrt(μMc/rMc) + vrf*sin(φf)) - 2*sin(φf)*(sin(φmf)*sqrt(μMc/rMc) + vrf*cos(φf) - vnf*sin(φf)))
ψrf == -λrL2*(2*rf - 2*cos(φf - φmf)*(xL2c + 1)) - α0*μMc*(2*rf - 2*cos(φf - φmf))/(rf^2 - 2*cos(φf - φmf)*rf + 1)^(3/2)
ψφf == -α0*(2*(vrf*cos(φf) - vnf*sin(φf))*(vnf*cos(φf) - cos(φmf)*sqrt(μMc/rMc) + vrf*sin(φf)) - 2*(vnf*cos(φf) + vrf*sin(φf))*(sin(φmf)*sqrt(μMc/rMc) + vrf*cos(φf) - vnf*sin(φf)) + 2*rf*μMc*sin(φf - φmf)/(rf^2 - 2*cos(φf - φmf)*rf + 1)^(3/2)) - 2*rf*λrL2*sin(φf - φmf)*(xL2c + 1)
ψmf == 0
ψφmf == 2*rf*λrL2*sin(φf - φmf)*(xL2c + 1) - α0*(2*cos(φmf)*sqrt(μMc/rMc)*(sin(φmf)*sqrt(μMc/rMc) + vrf*cos(φf) - vnf*sin(φf)) + 2*sin(φmf)*sqrt(μMc/rMc)*(vnf*cos(φf) - cos(φmf)*sqrt(μMc/rMc) + vrf*sin(φf)) - 2*rf*μMc*sin(φf - φmf)/(rf^2 - 2*cos(φf - φmf)*rf + 1)^(3/2))
ψφsf == 0
rf^2 + (1 + xL2c)^2 - 2*rf*(1 + xL2c)*cos(φf - φmf) - ΔrL2c^2 == 0
# Residual vector function
μE = 0.98785
α0 := 1
f_cond(xx) :=
    [vrf; vnf; rf; φf; m_f; φmf; φsf; ψvrf; ψvnf; ψrf; ψφf; ψmf; ψφmf; ψφsf] ← xx
    yv[0] ← ψvrf - (-α0*(2*cos(φf)*(sin(φmf)*sqrt(μE/rM) + vrf*cos(φf) - vnf*sin(φf)) + 2*sin(φf)*(vnf*cos(φf) - cos(φmf)*sqrt(μE/rM) + vrf*sin(φf))))
    yv[1] ← ψvnf - (-α0*(2*cos(φf)*(vnf*cos(φf) - cos(φmf)*sqrt(μE/rM) + vrf*sin(φf)) - 2*sin(φf)*(sin(φmf)*sqrt(μE/rM) + vrf*cos(φf) - vnf*sin(φf))))
    yv[2] ← rf^2 + (1 + |xL2|)^2 - 2*rf*(1 + |xL2|)*cos(φf - φmf) - ΔrL2^2
    λrL2 ← -((ψrf + α0*μM*(2*rf - 2*cos(φf - φmf))/(rf^2 - 2*cos(φf - φmf)*rf + 1)^(3/2))/(2*rf - 2*cos(φf - φmf)*(|xL2| + 1)))
    yv[3] ← ψφf - (-α0*(2*(vrf*cos(φf) - vnf*sin(φf))*(vnf*cos(φf) - cos(φmf)*sqrt(μE/rM) + vrf*sin(φf)) - 2*(vnf*cos(φf) + vrf*sin(φf))*(sin(φmf)*sqrt(μE/rM) + vrf*cos(φf) - vnf*sin(φf)) + 2*rf*μM*sin(φf - φmf)/(rf^2 - 2*cos(φf - φmf)*rf + 1)^(3/2)) - 2*rf*λrL2*sin(φf - φmf)*(|xL2| + 1))
    yv[4] ← ψmf - 0
    yv[5] ← ψφmf - (-α0*(2*(vrf*cos(φf) - vnf*sin(φf))*(vnf*cos(φf) - cos(φmf)*sqrt(μE/rM) + vrf*sin(φf)) - 2*(vnf*cos(φf) + vrf*sin(φf))*(sin(φmf)*sqrt(μE/rM) + vrf*cos(φf) - vnf*sin(φf)) + 2*rf*μM*sin(φf - φmf)/(rf^2 - 2*cos(φf - φmf)*rf + 1)^(3/2)) - 2*rf*λrL2*sin(φf - φmf)*(|xL2| + 1))
    yv[6] ← ψφsf - 0
    yv
-1*z/sqrt(x^2 + y^2 + z^2)^3 + Nr/(m_^2*ψm)*ψvz
Nr/(m_^3*ψm)*(ψvx^2 + ψvy^2 + ψvz^2)
-Nr*(ψvx^2 + ψvy^2 + ψvz^2)/(2*m_^2*ψm^2)
f_cond(xx0) = [0.3; -1.68781; 1.23649; -0.0987812; 0.1; -0.0987812; 0.1]
Ham_opt(xx) :=
    xvec ← rhs(xx)
    ham_c ← sum(xx[7 + jj]*xvec[jj], jj = 0 .. 6)
    ham_c
Ham_opt(xx0) = -9.66063
r0 := 6571 km*unitR^-1 = 0.0170942
[-0.183957205678; 2.96295936099; -2.0386793685; 21.8047234553]
rα0 := 2.96295936099
a0 := 0.5*(r0 + rα0) = 1.49003
ecc0 := (rα0 - r0)/(r0 + rα0) = 0.988528
p0 := a0*(1 - ecc0^2) = 0.0339922
vr0 := 0
vn0 := sqrt(μE/p0)*(1 + ecc0) = 10.7198
φ0 := -0.183957205678
# x1  -  ψvr(t0)
# x2 - ψvn(t0)
# x3 - ψr(t0)
# x4 - ψφ(t0)
# x5 - ψm(t0)
# x6 - ψfM(t0)
# x7 - ψfS(t0)
# x8 - tf
φm0 := -2.0386793685
φs0 := 0
rkadapt(D0, 0, x8, 10^-11, DD, 10^4, 10^-16)
residual(x1, x2, x3, x4, x5, x6, x7, x8) :=
    D0 ← [vr0; vn0; r0; φ0; 1; φm0; φs0; x1; x2; x3; x4; x5; x6; x7]
    U ← BDF(D0, 0, x8, 10^4, DD, 10^-14)
    for ii ∈ 0, 1 .. 13
        xxf[ii] ← U[rows(U) - 1, ii + 1]
    res ← f_cond(xxf)
    res[7] ← 0
    res
Ham_opt(xxf)
Ham_opt(xxf)
residual(0, 0, 0, 0, -1, 0.9, 0, 21) =  # error: Divide by zero.
[
    -1.13371491719*10^-5;
    2.59548545669*10^-3;
    0.821739150935;
    6.04682595691*10^-5;
    0;
    7.05356227214*10^-5;
    1.00678331862*10^-5;
    21.0300102889
]
[x1; x2; x3; x4; x5; x6; x7; x8] := [
    -5.06131058494*10^-8;
    1.12457723795*10^-4;
    0.0394686469895;
    3.16039721589*10^-7;
    -1*10^-3;
    -1.20894684775*10^-4;
    -1.65753935592*10^-4;
    23.2074886071
]
residual(-1.13371491719*10^-5, 2.59548545669*10^-3, 0.821739150935, 6.04682595691*10^-5, -0.1, 7.05356227214*10^-5, 1.00678331862*10^-5, 21.0300102889) = [0.382375; 0.155137; 0.139803; -0.265738; -0.1; -0.265405; -8.86144e-5; 0]
[x1; x2; x3; x4; x5; x6; x7; x8] := [0; 0; 0; 0; -1*10^-6; 0; 0; 22]  # disabled
[
    4.19538020077*10^-5;
    7.41723781437*10^-3;
    2.33992955893;
    -2.23608558422*10^-4;
    -2.19246473787*10^-20;
    -1.73243209168*10^-4;
    3.12619023301*10^-5;
    20.9480088536
]
Given  # disabled
residual(x1, x2, x3, x4, x5, x6, x7, x8) == 0  # disabled
sol := Find(x1, x2, x3, x4, x5, x6, x7, x8)  # disabled
[
    7.47326971536*10^-5;
    6.95954195702*10^-3;
    2.19489928388;
    -3.98294708571*10^-4;
    5.24128452153*10^-20;
    -3.62985114259*10^-4;
    1.54882599448*10^-4;
    21.0038866109
]
sol =  # error: This variable is undefined.
sol := [
    -1.13371491719*10^-5;
    2.59548545669*10^-3;
    0.821739150935;
    6.04682595691*10^-5;
    0;
    7.05356227214*10^-5;
    1.00678331862*10^-5;
    21.0300102889
]
traj_test_ :=
    D0 ← [vr0; vn0; r0; φ0; 1; φm0; φs0; sol[0]; sol[1]; sol[2]; sol[3]; sol[4]; sol[5]; sol[6]]
    U ← rkadapt(D0, 0, sol[7], 10^-11, DD, 10^4, 10^-16)
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# [component: outputs sss1]
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# Π
traj_a :=
    for i ∈ 0, 1 .. rows(sss1) - 1
        if (sss1[:, 15][i] - 2.4*10^-3) ≥ 0
            yv[i, 0] ← sss1[:, 3][i]
            yv[i, 1] ← sss1[:, 4][i]
        otherwise
            yv[i, 0] ← 0
            yv[i, 1] ← 0
    yv
traj_a =  # no stored result
xMoon_v := [1, sss1[:, 6][0]; 1, sss1[:, 6][rows(sss1) - 1]]
xSun_v := [4, sss1[:, 7][0]; 4, sss1[:, 7][rows(sss1) - 1]]
sss1[:, 6][0] = -2.03868
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xMoon_v = [1, -2.03868; 1, 19.7363]
sss1[18021, 0] = 18.021
sss1[rows(sss1) - 1, 0] = 21.775
(sss1[rows(sss1) - 1, 0] - sss1[18021, 0])*unitT = 16.3017 day
w := g*2150*s*unitV^-1
(P/w)*(sss1[rows(sss1) - 1, 0] - sss1[18021, 0])*unitM = 0.334008 kg
ε1 := 10^-8
delta_ :=
    for i ∈ 0, 1 .. rows(sss1) - 1
        delta_[i] ← 0.5*((sss1[:, 15][i] - 2.4*10^-3)/(|sss1[:, 15][i] - 2.4*10^-3| + ε1) + 1)
    delta_
sss1[:, 15][i] - 2.4*10^-3
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pitch_ :=
    for i ∈ 0, 1 .. rows(sss1) - 1
        pitch_[i] ← atan2(sss1[:, 9][i], sss1[:, 8][i])
    pitch_
pitch_a :=
    for i ∈ 0, 1 .. rows(sss1) - 1
        pitch_a[i] ← pitch_[i] if delta_[i] > 0.1
        pitch_a[i] ← NaN otherwise
    pitch_a
# Optimal pitch angle
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# relative distance for Earth
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r2Moon_1 :=
    for i ∈ 0, 1 .. rows(sss1) - 1
        r2moon[i] ← sqrt(sss1[i, 3]^2 + rM^2 - 2*sss1[i, 3]*rM*cos(sss1[i, 4] - sss1[i, 6]))
    r2moon
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(vnf*cos(φf) - cos(φmf)*sqrt(μMc/rMc) + vrf*sin(φf))^2 + (sin(φmf)*sqrt(μMc/rMc) + vrf*cos(φf) - vnf*sin(φf))^2 - 2*μMc/sqrt(rf^2 + 1 - 2*rf*1*cos(φf - φmf))
0.987849598635
μE = 0.98785
sqrt(μE/rM) = 0.993906
μE := 398600*(km^3/s^2)*unitT^2/unitR^3  # disabled
h_moon_ff :=
    for i ∈ 0, 1 .. rows(sss1) - 1
        hhh[i] ← (sss1[i, 2]*cos(sss1[i, 4]) - cos(sss1[i, 6])*sqrt(μE/rM) + sss1[i, 1]*sin(sss1[i, 4]))^2 + (sin(sss1[i, 6])*sqrt(μE/rM) + sss1[i, 1]*cos(sss1[i, 4]) - sss1[i, 2]*sin(sss1[i, 4]))^2 - 2*μM/sqrt(sss1[i, 3]^2 + 1 - 2*sss1[i, 3]*1*cos(sss1[i, 4] - sss1[i, 6]))
    hhh
h_moon_ff =  # no stored result
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# Change it
# relative  selenocentrcic energy - a true graph
tfff := 21.8047234553
t000 := sss1[rows(sss1) - 1, 0] = 21.775
traj_add :=
    D0 ← [
        sss1[rows(sss1) - 1, 1];
        sss1[rows(sss1) - 1, 2];
        sss1[rows(sss1) - 1, 3];
        sss1[rows(sss1) - 1, 4];
        sss1[rows(sss1) - 1, 5];
        sss1[rows(sss1) - 1, 6];
        sss1[rows(sss1) - 1, 7];
        sss1[rows(sss1) - 1, 8];
        sss1[rows(sss1) - 1, 9];
        sss1[rows(sss1) - 1, 10];
        sss1[rows(sss1) - 1, 11];
        sss1[rows(sss1) - 1, 12];
        sss1[rows(sss1) - 1, 13];
        sss1[rows(sss1) - 1, 14]
    ]
    U ← BDF(D0, t000, tfff*1.1, 10^4, DD, 10^-18)
    U
h_moon_ff_add :=
    for i ∈ 0, 1 .. rows(traj_add) - 1
        hhh[i] ← (traj_add[i, 2]*cos(traj_add[i, 4]) - cos(traj_add[i, 6])*sqrt(μE/rM) + traj_add[i, 1]*sin(traj_add[i, 4]))^2 + (sin(traj_add[i, 6])*sqrt(μE/rM) + traj_add[i, 1]*cos(traj_add[i, 4]) - traj_add[i, 2]*sin(traj_add[i, 4]))^2 - 2*μM/sqrt(traj_add[i, 3]^2 + 1 - 2*traj_add[i, 3]*1*cos(traj_add[i, 4] - traj_add[i, 6]))
    hhh
h_moon_ff_add =  # no stored result
xyz2elements(rvec, vvec) :=
    σc ← rvec×vvec
    σm ← |σc|
    pc ← σm^2
    incc ← acos(σc[2]/σm)
    hcur ← vvec*vvec - 2/|rvec|
    acur ← -1/hcur
    eccc ← sqrt(1 - pc/acur)
    rp ← pc/(1 + eccc)
    ra ← pc/(1 + (-eccc))
    Ωcur ← 0
    Λvec ← -σc×vvec - rvec/|rvec|
    Λ0 ← Λvec/|Λvec|
    l0 ← [cos(Ωcur); sin(Ωcur); 0]
    ωcur ← acos(Λ0*l0) if (l0×Λ0)[2] > 0
    ωcur ← 2*π - acos(Λ0*l0) if (l0×Λ0)[2] < 0
    if (l0×Λ0)[2] == 0
        ωcur ← 0 if (Λ0*l0) == 1
        ωcur ← π if (Λ0*l0) == -1
    uc ← acos(l0*rvec/|rvec|) if (l0×(rvec/|rvec|))[2] > 0
    uc ← 2*π + (-acos(l0*rvec/|rvec|)) if (l0×(rvec/|rvec|))[2] < 0
    if (l0×(rvec/|rvec|))[2] == 0
        ωcur ← 0 if (rvec/|rvec|*l0) == 1
        ωcur ← π if (rvec/|rvec|*l0) == -1
    [pc; eccc; rp; ωcur; ra; acur]
[cos(φφ), -sin(φφ); sin(φφ), cos(φφ)]
a_matrix_(φφ) := [cos(φφ), -sin(φφ), 0; sin(φφ), cos(φφ), 0; 0, 0, 1]
elements_ :=
    for i ∈ 0, 1 .. rows(sss1) - 1
        rvecc ← a_matrix_(sss1[i, 4])*[sss1[i, 3]; 0; 0]
        vvecc ← a_matrix_(sss1[i, 4])*[sss1[i, 1]; sss1[i, 2]; 0]
        el_vec_c ← xyz2elements(rvecc, vvecc)
        for jj ∈ 0, 1 .. 5
            yv[i, jj] ← el_vec_c[jj]
    yv
elements_ =  # no stored result
# p
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# ecc
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# rp
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# ω
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# ra
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# a ecc
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a_2d(φφ) := [cos(φφ), -sin(φφ); sin(φφ), cos(φφ)]
rvMoon_ :=
    nnf ← rows(sss1) - 1
    vSCxy ← a_2d(sss1[nnf, 4])*[sss1[nnf, 1]; sss1[nnf, 2]]
    vMxy ← a_2d(sss1[nnf, 6])*[0; sqrt(μE/rM)]
    vrMxy ← vSCxy - vMxy
    rSCxy ← a_2d(sss1[nnf, 4])*[sss1[nnf, 3]; 0]
    rMxy ← a_2d(sss1[nnf, 6])*[rM; 0]
    drMxy ← rSCxy - rMxy
    [vrMxy; drMxy]
rvMoon_[0] = [-0.00129325; -0.00235126]
rvMoon_[0]*unitV = [-1.32499; -2.40897] m/s
rvMoon_[1] = [0.151639; 0.186673]
rvMoon_[1]*unitR = [58289.9; 71757.2] km
rvES_ :=
    nnf ← rows(sss1) - 1
    rExy ← -a_2d(sss1[nnf, 6])*[rM; 0]
    rSxy ← a_2d(sss1[nnf, 7])*[rS; 0]
    rSxy ← rSxy - a_2d(sss1[nnf, 6])*[rM; 0]
    [rExy; rSxy]
rvES_[0] = [-0.631923; -0.775031]
rvES_[1] = [-22.3295; 387.794]
nM = 1
rvES_(tt) :=
    nnf ← rows(sss1) - 1
    φφM ← sss1[nnf, 6] + nM*tt
    φφS ← sss1[nnf, 7] + nS*tt
    rExy ← -a_2d(φφM)*[rM; 0]
    rSxy ← a_2d(φφS)*[rS; 0]
    rSxy ← rSxy - a_2d(φφM)*[rM; 0]
    [rExy; rSxy]
nS = 0.0746993
rvES_(10)[1] = [-279.819; 271.358]
ΦM == μM*([rM*cos(φ - φm) - r; -rM*sin(φ - φm)]/sqrt(r^2 - 2*cos(φ - φm)*r*rM + rM^2)^3 + (-1*[rM*cos(φ - φm); -rM*sin(φ - φm)]/rM^3))
RMoon := 1737.4 km*unitR^-1 = 0.00451977
m01 := 1 - (P/w)*(sss1[rows(sss1) - 1, 0] - sss1[18021, 0]) = 0.972166
ΔRMoon := 10000 km*unitR^-1
a00 := P/m01
RMoon + ΔRMoon = 0.0305343
h_fff := 100 km*unitR^-1
a0c(tt) := a00/(1 - a00/w*tt)
rhs_1a(xxx, tt) :=
    [vx; vy; x; y] ← xxx
    rMS ← rvES_(tt)
    drE ← rMS[0] - [x; y]
    drS ← rMS[1] - [x; y]
    ΦEc ← μE*(drE/|drE|^3 + (-rMS[0]/|rMS[0]|^3))
    ΦSc ← μS*(drS/|drS|^3 + (-rMS[1]/|rMS[1]|^3))
    ΦEc ← 0.3*ΦEc
    ΦSc ← ΦSc
    δc ← 1 if sqrt(x^2 + y^2) ≤ (RMoon + ΔRMoon)
    δc ← 0 otherwise
    acur ← δc*(-a0c(tt))*[vx; vy]/|[vx; vy]|
    rhsc ← [
        -μM*x/sqrt(x^2 + y^2)^3 + ΦEc[0] + ΦSc[0] + acur[0];
        -μM*y/sqrt(x^2 + y^2)^3 + ΦEc[1] + ΦSc[1] + acur[1];
        vx;
        vy
    ]
    rhsc
rhs_1(xxx, tt) :=
    [vx; vy; x; y] ← xxx
    rMS ← rvES_(tt)
    drE ← rMS[0] - [x; y]
    drS ← rMS[1] - [x; y]
    ΦEc ← μE*(drE/|drE|^3 + (-rMS[0]/|rMS[0]|^3))
    ΦSc ← μS*(drS/|drS|^3 + (-rMS[1]/|rMS[1]|^3))
    ΦEc ← 0.3*ΦEc
    ΦSc ← ΦSc
    acur ← -a0c(tt)*[vy; vx]/|[vy; vx]|
    rhsc ← [
        -μM*x/sqrt(x^2 + y^2)^3 + ΦEc[0] + ΦSc[0] + acur[0];
        -μM*y/sqrt(x^2 + y^2)^3 + ΦEc[1] + ΦSc[1] + acur[1];
        vx;
        vy
    ]
    rhsc
rvMoon_
rhs_1([1; 2; 3; 4], 2) = [-0.463964; 0.0231725; 1; 2]
DD3(t, D) := rhs_1(D, t)
DD3a(t, D) := rhs_1a(D, t)
tf3 := 15 day*unitT^-1 = 3.45425
# 2 stage - we use this law
# from 15 up to 73 day
# 1 stage - we can use this low for baking upt 15 days
δc ← 1  # when current absolute value of a radi vector LE RMoon + ΔRMoon
traj_decel :=
    D0 ← [rvMoon_[0][0]; rvMoon_[0][1]; rvMoon_[1][0]; rvMoon_[1][1]]
    U ← BDF(D0, 0, tf3, 10^4, DD3, 10^-18)
    U
δc ← 0  # else
acur ← -a0c(tt)*[vy; vx]/|[vy; vx]|
acur ← δc*(-a0c(tt))*[vx; vy]/|[vx; vy]|
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rmoon_fr :=
    dφ ← 2*π/360
    φc ← 0
    for i ∈ 0, 1 .. 359
        yv[i, 0] ← (RMoon + h_fff)*cos(φc)
        yv[i, 1] ← (RMoon + h_fff)*sin(φc)
        φc ← φc + dφ
    yv
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tf4 := 73 day*unitT^-1 = 16.8107
traj_decel1 :=
    D0 ← [
        traj_decel[:, 1][rows(traj_decel) - 1];
        traj_decel[:, 2][rows(traj_decel) - 1];
        traj_decel[:, 3][rows(traj_decel) - 1];
        traj_decel[:, 4][rows(traj_decel) - 1]
    ]
    U ← BDF(D0, tf3, tf4, 10^4, DD3a, 10^-18)
    U
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m01 := 1 - (P/w)*(sss1[rows(sss1) - 1, 0] - sss1[18021, 0])  # disabled
w = 20.5791
mfinal := (m01 - (P/w)*(73 day*unitT^-1))*unitM = 10.1703 kg
# Total propellant
mIodineΣ := 1*unitM - mfinal = 1.82972 kg
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H_1 == ψvx*(-μEcc*x/sqrt(x^2 + y^2)^3 + P/mcc*ψvx/sqrt(ψvx^2 + ψvy^2)) + ψvy*(-μEcc*y/sqrt(x^2 + y^2)^3 + P/mcc*ψvy/sqrt(ψvx^2 + ψvy^2)) + ψx*vx + ψy*vy + ψm*(-Pcc/wcc)
[vx; vy; x; y] ← xxx
rMS ← rvES_(tt)
drE ← rMS[0] - [x; y]
drS ← rMS[1] - [x; y]
ΦEc ← μE*(drE/|drE|^3 + (-rMS[0]/|rMS[0]|^3))
ΦSc ← μS*(drS/|drS|^3 + (-rMS[1]/|rMS[1]|^3))
Ham_1_c(vx, vy, x, y, mc, ψvx, ψvy, ψx, ψy, ψm, tt) :=
    rMS ← rvES_(tt)
    drE ← rMS[0] - [x; y]
    drS ← rMS[1] - [x; y]
    ΦEc ← μE*(drE/|drE|^3 + (-rMS[0]/|rMS[0]|^3))
    ΦSc ← μS*(drS/|drS|^3 + (-rMS[1]/|rMS[1]|^3))
    ΦEc ← [0; 0]
    ΦSc ← [0; 0]
    H_1c ← ψvx*(-μM*x/sqrt(x^2 + y^2)^3 + (P/mc*ψvx/sqrt(ψvx^2 + ψvy^2)) + ΦEc[0] + ΦSc[0]) + ψvy*(-μM*y/sqrt(x^2 + y^2)^3 + (P/mc*ψvy/sqrt(ψvx^2 + ψvy^2)) + ΦEc[1] + ΦSc[1]) + ψx*vx + ψy*vy + ψm*(-P/w)
    H_1c
hccc := 10^-15
rhs_2(xxx, tt) :=
    [vx; vy; x; y; mc; ψvx; ψvy; ψx; ψy; ψmc] ← xxx
    rhsc ← [
        hccc^-1*Im(Ham_1_c(vx, vy, x, y, mc, ψvx + 1i*hccc, ψvy, ψx, ψy, ψmc, tt));
        hccc^-1*Im(Ham_1_c(vx, vy, x, y, mc, ψvx, ψvy + 1i*hccc, ψx, ψy, ψmc, tt));
        hccc^-1*Im(Ham_1_c(vx, vy, x, y, mc, ψvx, ψvy, ψx + hccc*1i, ψy, ψmc, tt));
        hccc^-1*Im(Ham_1_c(vx, vy, x, y, mc, ψvx, ψvy, ψx, ψy + hccc*1i, ψmc, tt));
        hccc^-1*Im(Ham_1_c(vx, vy, x, y, mc, ψvx, ψvy, ψx, ψy, ψmc + hccc*1i, tt));
        -hccc^-1*Im(Ham_1_c(vx + hccc*1i, vy, x, y, mc, ψvx, ψvy, ψx, ψy, ψmc, tt));
        -hccc^-1*Im(Ham_1_c(vx, vy + hccc*1i, x, y, mc, ψvx, ψvy, ψx, ψy, ψmc, tt));
        -hccc^-1*Im(Ham_1_c(vx, vy, x + hccc*1i, y, mc, ψvx, ψvy, ψx, ψy, ψmc, tt));
        -hccc^-1*Im(Ham_1_c(vx, vy, x, y + hccc*1i, mc, ψvx, ψvy, ψx, ψy, ψmc, tt));
        -hccc^-1*Im(Ham_1_c(vx, vy, x, y, mc + hccc*1i, ψvx, ψvy, ψx, ψy, ψmc, tt))
    ]
    rhsc
rhs_2([1; 2; 3; 4; 5; 6; 7; 8; 9; 10], 4) = [0.0195684; 0.0227812; 1; 2; -0.00741449; -8; -9; -0.00102646; -0.00146582; 0.0562702]
2 + 4 = 6
μM = 0.0121504
DD4(t, D) := rhs_2(D, t)
RMoon = 0.00451977
vxf^2 + vyf^2 - μMccc/rff
ψxf == -λ1*vxf
ψyf == -λ1*vyf
λ1 == -ψxf/vxf
ψvyf == -2*vyf*λ2 - λ1*yf
ψvxf == -2*vxf*λ2 - (-ψxf/vxf*xf)
[x; y; 0]×[vx; vy; 0] → [0; 0; vy*x - vx*y]
2*vxf*λ2 == ψxf/vxf*xf + ψvxf
vy*x - vx*y - sqrt(μMccc*rff) == 0
rff*sqrt(μMccc/rff) == sqrt(μMccc*rff)
λ2 == ψxf/(vxf*(2*vxf))*xf + ψvxf/(2*vxf)
xf*vxf + yf*vyf == 0
xf^2 + yf^2 - rff^2
ψvyf == -2*vyf*(ψxf/(vxf*(2*vxf))*xf + ψvxf/(2*vxf)) - (-ψxf/vxf*yf)
vxf^2 + vyf^2 - 2*μMccc/sqrt(xf^2 + yf^2) == -μMccc/rff
λ1*(vyf*x - vx*y - sqrt(μMccc*rff)) + λ2*(xf^2 + yf^2 - rff^2) + λ3*(xf*vxf + yf*vyf)
ψvyf == -vyf*(ψxf/(vxf*vxf)*xf + ψvxf/vxf) - (-ψxf/vxf*yf)
d/dyf(-(λ1*(vyf*xf - vxf*yf - sqrt(μMccc*rff)) + λ2*(xf^2 + yf^2 - rff^2) + λ3*(xf*vxf + yf*vyf))) → vxf*λ1 - vyf*λ3 - 2*λ2*yf
ψxf*vyf - ψyf*vxf == 0
ψvxf == λ1*yf - λ3*xf
ψvxf == -(ψxf*yf^2 + vyf*ψvyf*xf + vxf*ψvyf*yf - ψyf*xf*yf)/(vyf*xf^2 + 2*vxf*xf*yf + vyf*yf^2)*yf - (-(ψxf*yf^2 + vyf*ψvyf*xf + vxf*ψvyf*yf - ψyf*xf*yf)/(vyf*xf^2 + 2*vxf*xf*yf + vyf*yf^2)*xf)
ψvyf == -λ1*xf - λ3*yf
vxf^2 + vyf^2 - μMccc/rff == 0
ψxf == -vyf*λ1 - vxf*λ3 - 2*λ2*xf
ψyf == vxf*λ1 - vyf*λ3 - 2*λ2*yf
[-xf, 0, -yf; -vyf, -2*xf, vxf; vxf, -2*yf, -vyf]*[λ1; λ2; λ3] == [ψvyf; ψxf; ψyf] solve, [λ1; λ2; λ3] → [-(ψxf*yf^2 + vyf*ψvyf*xf + vxf*ψvyf*yf - ψyf*xf*yf)/(vyf*xf^2 + 2*vxf*xf*yf + vyf*yf^2), -(vxf^2*ψvyf - vyf^2*ψvyf + vxf*ψyf*xf + vyf*ψxf*xf + vxf*ψxf*yf + vyf*ψyf*yf)/(2*vyf*xf^2 + 4*vxf*xf*yf + 2*vyf*yf^2), -(ψyf*xf^2 + vxf*ψvyf*xf + vyf*ψvyf*yf - ψxf*xf*yf)/(vyf*xf^2 + 2*vxf*xf*yf + vyf*yf^2)]
ψvyf + vyf*(ψxf/(vxf*vxf)*xf + ψvxf/vxf) - ψxf/vxf*yf == 0
rff := RMoon + 0 km*unitR^-1 = 0.00451977
α0 = 1
ψvxf == -(ψxf*yf^2 + vyf*ψvyf*xf + vxf*ψvyf*yf - ψyf*xf*yf)/(vyf*xf^2 + 2*vxf*xf*yf + vyf*yf^2)*yf - (-(ψxf*yf^2 + vyf*ψvyf*xf + vxf*ψvyf*yf - ψyf*xf*yf)/(vyf*xf^2 + 2*vxf*xf*yf + vyf*yf^2)*xf)
fcond_f(xxxf) :=
    [vx; vy; x; y; mc; ψvx; ψvy; ψx; ψy; ψmc] ← xxxf
    resc ← [
        ψvx - (-(ψx*y^2 + vy*ψvy*x + vx*ψvy*y - ψy*x*y)/(vy*x^2 + 2*vx*x*y + vy*y^2)*y - (-(ψx*y^2 + vy*ψvy*x + vx*ψvy*y - ψy*x*y)/(vy*x^2 + 2*vx*x*y + vy*y^2)*x));
        vy*x - vx*y - sqrt(μM*rff);
        x^2 + y^2 - rff^2;
        x*vx + y*vy
    ]
    resc
[
    ψvx - (-(ψx*y^2 + vy*ψvy*x + vx*ψvy*y - ψy*x*y)/(vy*x^2 + 2*vx*x*y + vy*y^2)*y - (-(ψx*y^2 + vy*ψvy*x + vx*ψvy*y - ψy*x*y)/(vy*x^2 + 2*vx*x*y + vy*y^2)*x));
    x*vx + y*vy;
    vy*x - vx*y - sqrt(μM*rff);
    x^2 + y^2 - rff^2
]
φ00 := 45 deg
xvecf := [-sqrt(μM/rff)*sin(φ00); sqrt(μM/rff)*cos(φ00); rff*cos(φ00); rff*sin(φ00)]
μM = 0.0121504
residual1(y1, y2, y3, y4, y5, y6) :=
    D0 ← [rvMoon_[0][0]; rvMoon_[0][1]; rvMoon_[1][0]; rvMoon_[1][1]; m01; y1; y2; y3; y4; y5]
    U ← BDF(D0, 0, y6, 10^4, DD4, 10^-18)
    for jj ∈ 0, 1 .. 9
        xxxfc[jj] ← U[rows(U) - 1, jj + 1]
    fcondvec ← fcond_f(xxxfc)
    res ← [
        xxxfc[0] - xvecf[0];
        xxxfc[1] - xvecf[1];
        xxxfc[2] - xvecf[2];
        xxxfc[3] - xvecf[3];
        U[rows(U) - 1, 10];
        Ham_1_c(U[rows(U) - 1, 1], U[rows(U) - 1, 2], U[rows(U) - 1, 3], U[rows(U) - 1, 4], U[rows(U) - 1, 5], U[rows(U) - 1, 6], U[rows(U) - 1, 7], U[rows(U) - 1, 8], U[rows(U) - 1, 9], U[rows(U) - 1, 10], y6) - α0
    ]
    res  # disabled
[
    U[rows(U) - 1, 3]*U[rows(U) - 1, 1] + U[rows(U) - 1, 4]*U[rows(U) - 1, 2];
    U[rows(U) - 1, 8]*U[rows(U) - 1, 2] - U[rows(U) - 1, 9]*U[rows(U) - 1, 1];
    U[rows(U) - 1, 1]^2 + U[rows(U) - 1, 2]^2 - μM/rff;
    U[rows(U) - 1, 7] + U[rows(U) - 1, 2]*(U[rows(U) - 1, 8]/(U[rows(U) - 1, 1]*U[rows(U) - 1, 1])*U[rows(U) - 1, 3] + U[rows(U) - 1, 6]/U[rows(U) - 1, 1]) - U[rows(U) - 1, 9]/U[rows(U) - 1, 1]*U[rows(U) - 1, 4];
    U[rows(U) - 1, 10];
    Ham_1_c(U[rows(U) - 1, 1], U[rows(U) - 1, 2], U[rows(U) - 1, 3], U[rows(U) - 1, 4], U[rows(U) - 1, 5], U[rows(U) - 1, 6], U[rows(U) - 1, 7], U[rows(U) - 1, 8], U[rows(U) - 1, 9], U[rows(U) - 1, 10], y6) - α0
]
[
    fcondvec[0];
    fcondvec[1];
    fcondvec[2];
    fcondvec[3];
    U[rows(U) - 1, 10];
    Ham_1_c(U[rows(U) - 1, 1], U[rows(U) - 1, 2], U[rows(U) - 1, 3], U[rows(U) - 1, 4], U[rows(U) - 1, 5], U[rows(U) - 1, 6], U[rows(U) - 1, 7], U[rows(U) - 1, 8], U[rows(U) - 1, 9], U[rows(U) - 1, 10], y6) - α0
]
xvecf = [-1.15937; 1.15937; 0.00319596; 0.00319596]
[
    xxxfc[0] - rvMoon_[0][0];
    xxxfc[1] - rvMoon_[0][1];
    xxxfc[2] - rvMoon_[1][0];
    xxxfc[3] - rvMoon_[1][1];
    xxxfc[4] - m01;
    H0 - α0
]
residual1(y1, y2, y3, y4, y5, y6) :=
    D0 ← [xvecf[0]; xvecf[1]; xvecf[0]; xvecf[1]; y5; y1; y2; y3; y4; 0]
    U ← BDF(D0, y6, 0, 10^4, DD4, 10^-18)
    for jj ∈ 0, 1 .. 9
        xxxfc[jj] ← U[rows(U) - 1, jj + 1]
    H0 ← Ham_1_c(U[0, 1], U[0, 2], U[0, 3], U[0, 4], U[0, 5], U[0, 6], U[0, 7], U[0, 8], U[0, 9], U[0, 10], y6)
    res ← [
        xxxfc[0] - rvMoon_[0][0];
        xxxfc[1] - rvMoon_[0][1];
        xxxfc[2] - rvMoon_[1][0];
        xxxfc[3] - rvMoon_[1][1];
        xxxfc[4] - m01;
        H0 - α0
    ]
    res
[
    xxxfc[5] - 0;
    xxxfc[6] - 0;
    xxxfc[2] - rvMoon_[1][0];
    xxxfc[3] - rvMoon_[1][1];
    xxxfc[4] - m01;
    H0 - α0
]
residual1(0.01, 0.02, 0.03, 0.05, 0.06, 1) = [-2.31287; -0.931209; 0.429906; 0.885304; -0.904752; -0.91998]
[-2.72145319486; -5.6232532345; -1.79669637565; -4.56685295967; -0.866981399714; 1.9677306737]
[-3.10804836566; -5.43276080563; -1.82483270522; -3.99677123058; -0.793023375664; 1.74672035954]
20 day*unitT^-1 = 4.60566
[y1; y2; y3; y4; y5; y6] := [-0.001; 0.001; 0.001; -0.001; 0.8; 4]
Given
residual1(y1, y2, y3, y4, y5, y6) == 0
sol_1 := Find(y1, y2, y3, y4, y5, y6)  # disabled
[-2.72145319486; -5.6232532345; -1.79669637565; -4.56685295967; -0.866981399714; 1.9677306737]
sol_1 =  # error
[-3.12992362507; -5.42078267844; -1.79958420936; -3.9395043869; -0.804677162257; 1.76387316034]
[-2.72145291625; -5.62325322638; -1.79669649794; -4.56685260178; -0.866983216543; 1.96773396162]
[-2.72145291625; -5.62325322638; -1.79669649794; -4.56685260178; -0.866983216543; 1.96773396162]
traj_d :=
    D0 ← [
        rvMoon_[0][0];
        rvMoon_[0][1];
        rvMoon_[1][0];
        rvMoon_[1][1];
        m01;
        sol_1[0];
        sol_1[1];
        sol_1[2];
        sol_1[3];
        sol_1[4]
    ]
    U ← BDF(D0, 0, sol_1[5], 10^4, DD4, 10^-18)  # error: This variable is undefined.
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traj_d =  # error
traj_decel1 :=
    nfff ← rows(traj_d) - 1
    D0 ← [traj_d[nfff, 1]; traj_d[nfff, 2]; traj_d[nfff, 3]; traj_d[nfff, 4]]
    U ← BDF(D0, 0, 10, 10^4, DD3, 10^-18)
    U  # error: This variable is undefined.
sqrt(μM/rff) = 1.6396
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